OpenVSP model (file version 5), 9 components.
Geometry view with OpenVSP parameter names; values to 6 digits, angles in degrees, lengths in the model's unit.
Overall bounding box: X_Min=-10.4288 X_Len=23.5293 Y_Min=-23.3016 Y_Len=46.6033 Z_Min=-2.50138 Z_Len=12.3826

Wing "WingGeom"
  location (X Y Z) -2.5 0 2.4, rotation 0 0 0
  symmetric about XZ
  bounding box size 5.97499 35.8513 1.7744
  totals: TotalSpan=36 TotalProjectedSpan=35.8513 TotalChord=3.95 TotalArea=138.428 TotalAR=9.28507
  root: chord 5.3, twist 5.56701, NACA 4-series Camber=0.022 CamberLoc=0.5 ThickChord=0.18
  sections:
    n  Span     Root_Chord  Tip_Chord  Area     Sweep     Sweep_Location  Dihedral  Twist  Twist_Location  tip airfoil
    1  7.60302  5.3         3.95       35.164   -1.55753  0               7.11957   0      0.25            NACA 4-series Camber=0.03 CamberLoc=0.5 ThickChord=0.15
    2  10.397   3.95        2.6        34.0501  -2.68182  0               -3.15217  0      0.25            NACA 4-series Camber=0.09 CamberLoc=0.5 ThickChord=0.12

Fuselage "FuselageGeom"
  location (X Y Z) -10.1087 0 -0.326087, rotation 0 0 0
  bounding box size 23.5293 5.92273 5.31655
  Design: Length=23.12
  cross sections:
    n  XLocPercent  YLocPercent  ZLocPercent  shape
    0  0            0            0.0074516    ellipse Ellipse_Height=0.8 Ellipse_Width=1.4
    1  0.076087     0            0.00951087   rounded rectangle RoundRectXSec_Radius=1.15 RoundedRect_Height=2.5 RoundedRect_Width=3.175
    2  0.251536     0            0.02         rounded rectangle RoundRectXSec_Radius=1.5 RoundRect_Keystone=0.45 RoundedRect_Height=4.86 RoundedRect_Width=4.95
    3  0.367666     0            0.0208899    rounded rectangle RoundRectXSec_Radius=1.5 RoundedRect_Height=5.3 RoundedRect_Width=5.7
    4  0.5          0            0.0200408    rounded rectangle RoundRectXSec_Radius=1.5 RoundRect_Keystone=0.522727 RoundedRect_Height=4.7 RoundedRect_Width=5.5
    5  0.625        0            0.0137568    rounded rectangle RoundRectXSec_Radius=0.9 RoundRect_Keystone=0.6 RoundedRect_Height=3.55 RoundedRect_Width=3.9
    6  0.733696     0            0.0106997    rounded rectangle RoundRectXSec_Radius=0.45 RoundRect_Keystone=0.7 RoundedRect_Height=2.61364 RoundedRect_Width=2.5
    7  0.905925     0            0.00789742   rounded rectangle RoundRectXSec_Radius=0.2 RoundRect_Keystone=0.772727 RoundedRect_Height=1.13481 RoundedRect_Width=1.1
    8  1            0            0.0050796    ellipse Ellipse_Height=0.183636 Ellipse_Width=0.611164

Wing "V-tail"
  location (X Y Z) 9.05571 0.217391 0.251444, rotation 0 0 0
  symmetric about XZ
  bounding box size 6.30583 14.5644 5.60379
  totals: TotalSpan=17.1753 TotalProjectedSpan=14.1296 TotalChord=3.3 TotalArea=56.6784 TotalAR=3.52244
  root: chord 3.92656, twist 10.7216, NACA 4-series Camber=0.01 CamberLoc=0.25 ThickChord=0.14
  sections:
    n  Span     Root_Chord  Tip_Chord  Area     Sweep     Sweep_Location  Dihedral  Twist  Twist_Location  tip airfoil
    1  8.58763  3.92656     2.67344    28.3392  -15.8029  0               34.6467   0      0.25            NACA 4-series Camber=0.01 CamberLoc=0.25 ThickChord=0.11

Stack "engine1"
  location (X Y Z) -8.83322 7.64672 3.56522, rotation 0 0 0
  symmetric about XZ
  bounding box size 8.69873 17.1937 1.88406
  cross sections:
    n  XDelta    YDelta  ZDelta  shape
    0  0         0       0       circle Circle_Diameter=0.85
    1  0.680091  0       0       circle Circle_Diameter=1.4
    2  1.18559   0       0       ellipse Ellipse_Height=1.8 Ellipse_Width=1.72
    3  1.18559   0       0       ellipse Ellipse_Height=1.88 Ellipse_Width=1.85
    4  2.37119   0       0       ellipse Ellipse_Height=1.45 Ellipse_Width=1.85
    5  1.9233    0       0       ellipse Ellipse_Height=0.65 Ellipse_Width=1.4
    6  1.00263   0       0       ellipse Ellipse_Height=0.01 Ellipse_Width=0.8

Stack "engine-wingtip", child of "engine1"
  location (X Y Z) -5.89672 18.2714 2.79093, rotation 0 0 0
  symmetric about XZ
  bounding box size 5.98335 38.2891 1.51907
  cross sections:
    n  XDelta    YDelta      ZDelta  shape
    0  0         0           0       circle Circle_Diameter=0.8
    1  0.680091  0           0       circle Circle_Diameter=1.3
    2  1.18559   0           0       ellipse Ellipse_Height=1.48524 Ellipse_Width=1.72
    3  1.02166   -0.0339395  0       ellipse Ellipse_Height=1.25023 Ellipse_Width=1.75
    4  1.30561   -0.0505891  0       ellipse Ellipse_Height=0.78 Ellipse_Width=1.65
    5  1.02166   -0.0371414  0       ellipse Ellipse_Height=0.38 Ellipse_Width=1.45
    6  0.510829  -0.0403432  0       ellipse Ellipse_Height=0.2 Ellipse_Width=1.3

Stack "engine-tail", child of "engine-wingtip"
  location (X Y Z) 4.62129 7.69915 5.07354, rotation 0 0 0
  symmetric about XZ
  bounding box size 5.44501 17.0389 1.48897
  cross sections:
    n  XDelta    YDelta      ZDelta  shape
    0  0         0           0       circle Circle_Diameter=0.9
    1  0.680091  0           0       circle Circle_Diameter=1.35
    2  1.18559   0           0       ellipse Ellipse_Height=1.42 Ellipse_Width=1.62
    3  1.02166   -0.0230533  0       ellipse Ellipse_Height=1.12 Ellipse_Width=1.62
    4  0.813808  -0.0429047  0       ellipse Ellipse_Height=0.81 Ellipse_Width=1.5
    5  1.02166   -0.108222   0       ellipse Ellipse_Height=0.4 Ellipse_Width=1.25
    6  0.428862  -0.0493084  0       ellipse Ellipse_Height=0.2 Ellipse_Width=1.1

Propeller "Prop1"
  location (X Y Z) -7.93478 7.64266 3.61923, rotation 0 0 0
  symmetric about XZ
  bounding box size 0.689817 25.2913 9.55291
  Design: Diameter=10 NumBlade=5 Beta34=43.7113 UseBeta34Flag=1 Feather=-15.3832 Rotate=0 Precone=2.78351 ReverseFlag=0 FoldAngle=0 PropMode=0 AF=94.8287 CLi=0.540239 Chord=0.173162 Solidity=0.275595 ConstructXoC=0.5 FeatherAxisXoC=0.5 FeatherOffsetXoC=0
  cross sections:
    n  RadiusFrac  shape
    0  0.1         ellipse Ellipse_Height=0.407407 Ellipse_Width=0.814815
    1  0.4         NACA 16-series Chord=1.15561 IdealCl=0.7 ThickChord=0.144074
    2  1           NACA 16-series Chord=0.381944 IdealCl=0.2 ThickChord=0.03
  Chord along r/R (cubic Bezier): 0.1: 0.162963, 0.267705: 0.29537, 0.43541: 0.224074, 0.603115: 0.178241, 0.693354: 0.152778, 0.783593: 0.101852, 0.873832: 0.101852, 0.915888: 0.0916667, 0.957944: 0.0916667, 1: 0.0763889
  Twist along r/R (PCHIP): 0.1: 46.75, 0.620249: 52.1481, 1: 78.7824
  Rake along r/R (linear): 0.1: 0.00407407, 1: 0
  Skew along r/R (linear): 0.1: 0, 1: 0
  Thick along r/R (cubic Bezier): 0.1: 0.5, 0.166667: 0.3, 0.233333: 0.225, 0.3: 0.2, 0.4: 0.125, 0.5: 0.115, 0.6: 0.1, 0.733333: 0.075, 0.866667: 0.055, 1: 0.03
  CLI along r/R (cubic Bezier): 0.1: 0, 0.2: 0.7, 0.3: 0.7, 0.4: 0.7, 0.466667: 0.7, 0.533333: 0.7, 0.6: 0.7, 0.733333: 0.7, 0.866667: 0.7, 1: 0.2

Propeller "Prop2-wingtip"
  location (X Y Z) -4.91168 18.3009 2.84541, rotation 0 0 0
  symmetric about XZ
  bounding box size 0.707196 46.6033 9.53565
  Design: Diameter=10 NumBlade=5 Beta34=45.9423 UseBeta34Flag=0 Feather=-13.1522 Rotate=0 Precone=2.78351 ReverseFlag=0 FoldAngle=0 PropMode=0 AF=87.9487 CLi=0.540239 Chord=0.171115 Solidity=0.272338 ConstructXoC=0.5 FeatherAxisXoC=0.5 FeatherOffsetXoC=0
  cross sections:
    n  RadiusFrac  shape
    0  0.1         ellipse Ellipse_Height=0.420139 Ellipse_Width=0.840278
    1  0.4         NACA 16-series Chord=1.16471 IdealCl=0.7 ThickChord=0.144074
    2  1           NACA 16-series Chord=0.280093 IdealCl=0.2 ThickChord=0.03
  Chord along r/R (cubic Bezier): 0.1: 0.168056, 0.267705: 0.300463, 0.43541: 0.224074, 0.603115: 0.178241, 0.694496: 0.152778, 0.785877: 0.0916667, 0.877259: 0.0916667, 0.918172: 0.0814815, 0.959086: 0.0712963, 1: 0.0560185
  Twist along r/R (PCHIP): 0.1: 46.75, 0.620249: 52.1481, 1: 78.7824
  Rake along r/R (linear): 0.1: 0.00407407, 1: 0
  Thick along r/R (cubic Bezier): 0.1: 0.5, 0.166667: 0.3, 0.233333: 0.225, 0.3: 0.2, 0.4: 0.125, 0.5: 0.115, 0.6: 0.1, 0.733333: 0.075, 0.866667: 0.055, 1: 0.03
  CLI along r/R (cubic Bezier): 0.1: 0, 0.2: 0.7, 0.3: 0.7, 0.4: 0.7, 0.466667: 0.7, 0.533333: 0.7, 0.6: 0.7, 0.733333: 0.7, 0.866667: 0.7, 1: 0.2

Propeller "Prop3-tail"
  location (X Y Z) 5.45155 7.67808 5.09916, rotation 0 0 0
  symmetric about XZ
  bounding box size 0.703202 25.3624 9.54884
  Design: Diameter=10 NumBlade=5 Beta34=45.9423 UseBeta34Flag=0 Feather=-13.1522 Rotate=0 Precone=2.78351 ReverseFlag=0 FoldAngle=0 PropMode=0 AF=94.8287 CLi=0.540239 Chord=0.173162 Solidity=0.275595 ConstructXoC=0.5 FeatherAxisXoC=0.5 FeatherOffsetXoC=0
  cross sections:
    n  RadiusFrac  shape
    0  0.1         ellipse Ellipse_Height=0.407407 Ellipse_Width=0.814815
    1  0.4         NACA 16-series Chord=1.15561 IdealCl=0.7 ThickChord=0.144074
    2  1           NACA 16-series Chord=0.381944 IdealCl=0.2 ThickChord=0.03
  Chord along r/R (cubic Bezier): 0.1: 0.162963, 0.267705: 0.29537, 0.43541: 0.224074, 0.603115: 0.178241, 0.693354: 0.152778, 0.783593: 0.101852, 0.873832: 0.101852, 0.915888: 0.0916667, 0.957944: 0.0916667, 1: 0.0763889
  Twist along r/R (PCHIP): 0.1: 46.75, 0.620249: 52.1481, 1: 78.7824
  Rake along r/R (linear): 0.1: 0.00407407, 1: 0
  Thick along r/R (cubic Bezier): 0.1: 0.5, 0.166667: 0.3, 0.233333: 0.225, 0.3: 0.2, 0.4: 0.125, 0.5: 0.115, 0.6: 0.1, 0.733333: 0.075, 0.866667: 0.055, 1: 0.03
  CLI along r/R (cubic Bezier): 0.1: 0, 0.2: 0.7, 0.3: 0.7, 0.4: 0.7, 0.466667: 0.7, 0.533333: 0.7, 0.6: 0.7, 0.733333: 0.7, 0.866667: 0.7, 1: 0.2
