OpenVSP model (file version 5), 13 components.
Geometry view with OpenVSP parameter names; values to 6 digits, angles in degrees, lengths in the model's unit.
Overall bounding box: X_Min=-4.39789 X_Len=18.7675 Y_Min=-11.9098 Y_Len=23.8196 Z_Min=-1.46562 Z_Len=6.85629

Wing "WingGeom"
  location (X Y Z) 1.95652 0 1.57609, rotation 0 0 0
  symmetric about XZ
  bounding box size 7.11389 20.7383 0.731613
  totals: TotalSpan=20.7509 TotalProjectedSpan=20.7383 TotalChord=2.7 TotalArea=47.8665 TotalAR=8.9849
  root: chord 5.09434, twist 0, NACA 4-series Camber=0 CamberLoc=0.2 ThickChord=0.12
  sections:
    n  Span     Root_Chord  Tip_Chord  Area     Sweep     Sweep_Location  Dihedral  Twist  Twist_Location  tip airfoil
    1  1.75851  5.09434     2.77642    6.92039  22        0               2         0      0.25            NACA 4-series Camber=0 CamberLoc=0.2 ThickChord=0.11
    2  3.07041  2.77642     2.13962    7.54712  -16.7727  0               2         0      0.25            NACA 4-series Camber=0 CamberLoc=0.2 ThickChord=0.1
    3  5.54654  2.13962     1.27358    9.46575  -18.0227  0               2         0      0.25            as above

Pod "Pod1", child of "WingGeom"
  location (X Y Z) 6.78571 4.34524 1.72179, rotation -180 0 -180; relative location 6.78571 4.34524 1.72179, rotation 0 180 0
  symmetric about XZ
  bounding box size 3.8 9.2432 0.552727
  Design: FineRatio=13.75 Length=3.8

Pod "Pod2", child of "Pod1"
  location (X Y Z) 5.35993 7.38823 1.83758, rotation -180 0 -180; relative location 5.35993 7.38823 1.83758, rotation 0 180 0
  symmetric about XZ
  bounding box size 3.8 15.3292 0.552727
  Design: FineRatio=13.75 Length=3.8

Propeller "Prop2", child of "Pod2"
  location (X Y Z) 4.85394 7.38483 1.83424, rotation 0 0 0
  symmetric about XZ
  bounding box size 0.222156 17.76 2.61003
  Design: Diameter=3 NumBlade=3 Beta34=22.0619 UseBeta34Flag=1 Feather=2.06186 Rotate=0 Precone=-5 ReverseFlag=0 FoldAngle=0 PropMode=0 AF=84.6045 CLi=0.540503 Chord=0.160549 Solidity=0.153313 ConstructXoC=0.5 FeatherAxisXoC=0.5 FeatherOffsetXoC=0
  cross sections:
    n  RadiusFrac  shape
    0  0.0369565   ellipse Ellipse_Height=0.0959062 Ellipse_Width=0.191812
    1  0.4         NACA 16-series Chord=0.31973 IdealCl=0.7 ThickChord=0.144074
    2  1           NACA 16-series Chord=0.0452222 IdealCl=0.2 ThickChord=0.03
  Chord along r/R (cubic Bezier): 0.0369565: 0.127875, 0.206258: 0.242616, 0.375559: 0.225602, 0.54486: 0.189597, 0.627103: 0.174167, 0.709346: 0.148449, 0.791589: 0.107301, 0.861059: 0.107301, 0.93053: 0.0746065, 1: 0.0301481
  Twist along r/R (PCHIP): 0.0369565: 46.75, 0.75: 20, 1: 13
  Thick along r/R (cubic Bezier): 0.0369565: 0.5, 0.124638: 0.3, 0.212319: 0.225, 0.3: 0.2, 0.4: 0.125, 0.5: 0.115, 0.6: 0.1, 0.733333: 0.075, 0.866667: 0.055, 1: 0.03
  CLI along r/R (cubic Bezier): 0.0369565: 0, 0.157971: 0.7, 0.278986: 0.7, 0.4: 0.7, 0.466667: 0.7, 0.533333: 0.7, 0.6: 0.7, 0.733333: 0.7, 0.866667: 0.7, 1: 0.2

Pod "Pod3", child of "Pod1"
  location (X Y Z) 3.66668 10.4072 1.95267, rotation -180 0 -180; relative location 3.66668 10.4072 1.95267, rotation 0 180 0
  symmetric about XZ
  bounding box size 4 21.4418 0.627451
  Design: FineRatio=12.75 Length=4

Propeller "Prop3", child of "Pod3"
  location (X Y Z) 3.17425 10.4146 1.92595, rotation 0 0 0
  symmetric about XZ
  bounding box size 0.222156 23.8196 2.61003
  Design: Diameter=3 NumBlade=3 Beta34=22.0619 UseBeta34Flag=1 Feather=2.06186 Rotate=0 Precone=-5 ReverseFlag=0 FoldAngle=0 PropMode=0 AF=84.6045 CLi=0.540503 Chord=0.160549 Solidity=0.153313 ConstructXoC=0.5 FeatherAxisXoC=0.5 FeatherOffsetXoC=0
  cross sections:
    n  RadiusFrac  shape
    0  0.0369565   ellipse Ellipse_Height=0.0959062 Ellipse_Width=0.191812
    1  0.4         NACA 16-series Chord=0.31973 IdealCl=0.7 ThickChord=0.144074
    2  1           NACA 16-series Chord=0.0452222 IdealCl=0.2 ThickChord=0.03
  blade curves as in "Prop2"

Propeller "Prop1", child of "Pod1"
  location (X Y Z) 6.30583 4.36141 1.71196, rotation 0 0 0
  symmetric about XZ
  bounding box size 0.222156 11.7131 2.61003
  Design: Diameter=3 NumBlade=3 Beta34=22.0619 UseBeta34Flag=1 Feather=2.06186 Rotate=0 Precone=-5 ReverseFlag=0 FoldAngle=0 PropMode=0 AF=84.6045 CLi=0.540503 Chord=0.160549 Solidity=0.153313 ConstructXoC=0.5 FeatherAxisXoC=0.5 FeatherOffsetXoC=0
  cross sections:
    n  RadiusFrac  shape
    0  0.0369565   ellipse Ellipse_Height=0.0959062 Ellipse_Width=0.191812
    1  0.4         NACA 16-series Chord=0.31973 IdealCl=0.7 ThickChord=0.144074
    2  1           NACA 16-series Chord=0.0452222 IdealCl=0.2 ThickChord=0.03
  blade curves as in "Prop2"

Fuselage "FuselageGeom"
  location (X Y Z) -4.13043 0 0, rotation 0 0 0
  bounding box size 18.5 2.52625 3.84232
  Design: Length=18.5
  cross sections:
    n  XLocPercent  YLocPercent  ZLocPercent  shape
    0  0            0            0            point
    1  0.126359     0            0.0122707    ellipse Ellipse_Height=2.5 Ellipse_Width=1.9
    2  0.234464     0            0.0220788    ellipse Ellipse_Height=3.5 Ellipse_Width=2.4
    3  0.381663     0            0.033288     ellipse Ellipse_Height=3.7 Ellipse_Width=2.5
    4  0.526245     0            0.0429688    ellipse Ellipse_Height=3.05 Ellipse_Width=2.2
    5  0.639946     0            0.0497622    ellipse Ellipse_Height=2.1 Ellipse_Width=1.5
    6  0.75         0            0.0591033    ellipse Ellipse_Height=1.3 Ellipse_Width=0.9
    7  0.862772     0            0.070822     ellipse Ellipse_Height=0.85 Ellipse_Width=0.5
    8  1            0            0.0815217    ellipse Ellipse_Height=0.35 Ellipse_Width=0.15

Wing "Wing_Canard"
  location (X Y Z) -3.26087 0 0, rotation 0 0 0
  symmetric about XZ
  bounding box size 1.1 5.2 0.440181
  totals: TotalSpan=5.2 TotalProjectedSpan=5.2 TotalChord=0.8375 TotalArea=4.18 TotalAR=6.4689
  root: chord 1.1, twist 0, NACA 4-series Camber=0 CamberLoc=0.2 ThickChord=0.4
  sections:
    n  Span  Root_Chord  Tip_Chord  Area  Sweep  Sweep_Location  Dihedral  Twist  Twist_Location  tip airfoil
    1  0.8   1.1         0.75       0.74  0      0               0         0      0.25            NACA 4-series Camber=0 CamberLoc=0.2 ThickChord=0.3
    2  1.8   0.75        0.75       1.35  0      0               0         0      0.25            as above

Pod "Pod_canard", child of "Wing_Canard"
  location (X Y Z) -0.597893 2.72818 0, rotation -180 0 -180; relative location -0.597893 2.72818 0, rotation 0 180 0
  symmetric about XZ
  bounding box size 3.8 6.12205 0.665693
  Design: FineRatio=11.4167 Length=3.8

Propeller "Prop_canard", child of "Wing_Canard"
  location (X Y Z) -1.06648 2.72805 0.013587, rotation 0 0 0
  symmetric about XZ
  bounding box size 0.222156 7.8013 2.43975
  Design: Diameter=3 NumBlade=3 Beta34=22.0619 UseBeta34Flag=1 Feather=2.06186 Rotate=-39.1753 Precone=-5 ReverseFlag=0 FoldAngle=0 PropMode=0 AF=84.6045 CLi=0.540503 Chord=0.160549 Solidity=0.153313 ConstructXoC=0.5 FeatherAxisXoC=0.5 FeatherOffsetXoC=0
  cross sections:
    n  RadiusFrac  shape
    0  0.0369565   ellipse Ellipse_Height=0.0959062 Ellipse_Width=0.191812
    1  0.4         NACA 16-series Chord=0.31973 IdealCl=0.7 ThickChord=0.144074
    2  1           NACA 16-series Chord=0.0452222 IdealCl=0.2 ThickChord=0.03
  blade curves as in "Prop2"

Wing "Wing_Horiz"
  location (X Y Z) 11.6033 0 1.4, rotation 0 0 0
  symmetric about XZ
  bounding box size 2.53906 7.8 0.254054
  totals: TotalSpan=7.8 TotalProjectedSpan=7.8 TotalChord=1.74609 TotalArea=11.8496 TotalAR=5.13435
  root: chord 2.53906, twist 0, NACA 4-series Camber=0 CamberLoc=0.2 ThickChord=0.1
  sections:
    n  Span  Root_Chord  Tip_Chord  Area     Sweep  Sweep_Location  Dihedral  Twist  Twist_Location  tip airfoil
    1  0.8   2.53906     1.72266    1.70469  44     0               0         0      0.25            as above
    2  3.1   1.72266     1          4.22012  13.5   0               0         0      0.25            as above

Wing "Wing_Vert"
  location (X Y Z) 11.2283 0 1.49796, rotation 90 0 0
  bounding box size 3.03937 0.291315 3.89271
  totals: TotalSpan=3.89271 TotalProjectedSpan=3.89271 TotalChord=1.91272 TotalArea=6.2475 TotalAR=2.42548
  root: chord 2.91146, twist 0, NACA 4-series Camber=0 CamberLoc=0.2 ThickChord=0.1
  sections:
    n  Span      Root_Chord  Tip_Chord  Area     Sweep    Sweep_Location  Dihedral  Twist  Twist_Location  tip airfoil
    1  0.692709  2.91146     1.8697     1.65598  56.5841  0               0         0      0.25            as above
    2  3.2       1.8697      1          4.59152  17.1818  0               0         0      0.25            as above
