OpenVSP model (file version 5), 12 components.
Geometry view with OpenVSP parameter names; values to 6 digits, angles in degrees, lengths in the model's unit.
Notes: RV-12 Built by Mathieu Fregeau 5/24/2025
Overall bounding box: X_Min=0 X_Len=6274 Y_Min=-4110.49 Y_Len=8220.99 Z_Min=-1080 Z_Len=2600.06

Fuselage "Fuselage"
  location (X Y Z) 0 0 0, rotation 0 0 0
  bounding box size 6143.66 1142.1 1190.72
  Design: Length=6070
  cross sections:
    n  XLocPercent  YLocPercent  YRotate  ZLocPercent  shape
    0  0            0            0        0.0115321    point
    1  0.0477759    0            0        0.0115321    circle Circle_Diameter=260
    2  0.0543657    0            0        0            general fuselage BotStr=1 BotTanAngle=90 CornerRad=0 Height=420 LowStr=1 MaxWidthLoc=0.17 TopStr=1 TopTanAngle=90 UpStr=1 Width=700
    3  0.160626     0            0        -0.0146937   general fuselage BotStr=1.4 BotTanAngle=90 CornerRad=0 Height=730 LowStr=1.4 MaxWidthLoc=0.05 TopStr=1.2 TopTanAngle=90 UpStr=1.2 Width=950
    4  0.217463     0            0        -0.00990226  general fuselage BotStr=1.4 BotTanAngle=90 CornerRad=0 Height=780 LowStr=1.4 MaxWidthLoc=0 TopStr=1.2 TopTanAngle=90 UpStr=1.2 Width=1020
    5  0.345964     0            0        0.0207628    general fuselage BotStr=1.2 BotTanAngle=90 CornerRad=0 Height=1162 LowStr=1.2 MaxWidthLoc=-0.28 TopStr=1.4 TopTanAngle=90 UpStr=1.4 Width=1120
    6  0.488468     0            0        0.0105437    general fuselage BotStr=1.4 BotTanAngle=90 CornerRad=0 Height=912 LowStr=1.5 MaxWidthLoc=-0.145 TopStr=1.2 TopTanAngle=90 UpStr=1.2 Width=990
    7  0.88056      0            0        0.0175685    general fuselage BotStr=1.4 BotTanAngle=90 CornerRad=0 Height=400 LowStr=1.4 MaxWidthLoc=0 TopStr=1 TopTanAngle=90 UpStr=1 Width=340
    8  1            0            -10      0.0280066    general fuselage BotStr=1 BotTanAngle=90 CornerRad=0 Height=200 LowStr=1 MaxWidthLoc=0 TopStr=1 TopTanAngle=90 UpStr=1 Width=120

Wing "LG_leg", child of "Fuselage"
  location (X Y Z) 2300 400 -390, rotation 0 0 0
  symmetric about XZ
  bounding box size 203.032 2016.52 520.677
  totals: TotalSpan=1580 TotalProjectedSpan=1210.35 TotalChord=100 TotalArea=158000 TotalAR=9.27182 MAC=101.333
  root: chord 120, twist 0, NACA 4-series Camber=0 CamberLoc=0.2 ThickChord=0.2
  sections:
    n  Span  Root_Chord  Tip_Chord  Area   Sweep  Sweep_Location  Dihedral  Twist  Twist_Location  tip airfoil
    1  790   120         80         79000  -6     0               -40       0      0.25            NACA 4-series Camber=0 CamberLoc=0.2 ThickChord=0.12

BodyOfRevolution "LG_wheel", child of "Fuselage"
  location (X Y Z) 2280 927 -870, rotation -5 0 90
  symmetric about XZ
  bounding box size 360 2174.77 362.238
  Design: A0=34636.1 Ae=34636.1 Amin=2827.43 AminW=0.25 Angle=0 Diameter=210 Mode=0
  profile: circle Circle_Diameter=150

BodyOfRevolution "wheel_center", child of "LG_wheel"
  location (X Y Z) 2280 981.791 -874.794, rotation -5 0 90; relative location 55 0 0, rotation 0 0 0
  symmetric about XZ
  bounding box size 252 2065.21 254.494
  Design: A0=3.14159 Ae=3.14159 Amin=48305.1 AminW=0.373231 Angle=0 Diameter=2 Mode=0
  profile: rounded rectangle RoundRectXSec_Radius=0.2 RoundedRect_Height=250 RoundedRect_Width=40

BodyOfRevolution "Nose_wheel", child of "Fuselage"
  location (X Y Z) 650 -75 -900, rotation 0 0 90
  bounding box size 360 150 360
  Design: A0=34636.1 Ae=34636.1 Amin=2827.43 AminW=0.25 Angle=0 Diameter=210 Mode=0
  profile: circle Circle_Diameter=150

BodyOfRevolution "wheel_center", child of "Nose_wheel"
  location (X Y Z) 650 -20 -900, rotation 0 0 90; relative location 55 0 0, rotation 0 0 0
  symmetric about XZ
  bounding box size 252 40.0005 252
  Design: A0=3.14159 Ae=3.14159 Amin=48305.1 AminW=0.373231 Angle=0 Diameter=2 Mode=0
  profile: rounded rectangle RoundRectXSec_Radius=0.2 RoundedRect_Height=250 RoundedRect_Width=40

Stack "StackGeom", child of "Nose_wheel"
  location (X Y Z) 370 0 -845, rotation 0 10 0; relative location 75 280 55, rotation 10 0 -90
  bounding box size 356.398 200 130.334
  cross sections:
    n  XDelta  YDelta  ZDelta  shape
    0  0       0       0       rounded rectangle RoundRectXSec_Radius=0.2 RoundedRect_Height=90 RoundedRect_Width=90
    1  30      0       0       rounded rectangle RoundRectXSec_Radius=0.2 RoundedRect_Height=90 RoundedRect_Width=130
    2  280     0       0       rounded rectangle RoundRectXSec_Radius=0.2 RoundedRect_Height=50 RoundedRect_Width=200

Stack "Nose_strut", child of "Fuselage"
  location (X Y Z) 880 0 -440, rotation 0 90 0
  bounding box size 510.211 51.8856 451.959
  cross sections:
    n  XDelta  YDelta  YRotate  ZDelta  shape
    0  0       0       0        0       circle Circle_Diameter=50
    1  40      0       0        0       as above
    2  80      0       65       -65     as above
    3  370     0       0        0       as above
    4  100     0       -65      75      as above
    5  30      0       0        0       as above

Wing "Wing"
  location (X Y Z) 1607 0 -300, rotation 0 0 0
  symmetric about XZ
  bounding box size 1449.33 8220.99 385.552
  totals: TotalSpan=7710 TotalProjectedSpan=7699.43 TotalChord=1449 TotalArea=1.11718e+07 TotalAR=5.30634 MAC=1449
  root: chord 1449, twist 0, NACA 63-series A=0.4 IdealCl=0.35 ThickChord=0.12
  sections:
    n  Span  Root_Chord  Tip_Chord  Area        Sweep  Sweep_Location  Dihedral  Twist  Twist_Location  tip airfoil
    1  3855  1449        1449       5.5859e+06  0      0               3         0      0.25            as above

Wing "Horizontal"
  location (X Y Z) 5484 0 140, rotation 0 0 0
  symmetric about XZ
  bounding box size 790 2517.45 79.0459
  totals: TotalSpan=2438.4 TotalProjectedSpan=2438.4 TotalChord=790 TotalArea=1.92634e+06 TotalAR=3.08658 MAC=790
  root: chord 790, twist 0, NACA 4-series Camber=0 CamberLoc=0.2 ThickChord=0.1
  sections:
    n  Span    Root_Chord  Tip_Chord  Area    Sweep  Sweep_Location  Dihedral  Twist  Twist_Location  tip airfoil
    1  1219.2  790         790        963168  0      0               0         0      0.25            as above

Wing "Vertical"
  location (X Y Z) 4800 0 270, rotation 90 0 0
  bounding box size 1335.95 128.575 1250.06
  totals: TotalSpan=1200 TotalProjectedSpan=1200 TotalChord=1127.82 TotalArea=1.23033e+06 TotalAR=1.17042 MAC=1053.79
  root: chord 1216.78, twist 0, NACA 4-series Camber=0 CamberLoc=0.2 ThickChord=0.1
  sections:
    n  Span  Root_Chord  Tip_Chord  Area         Sweep  Sweep_Location  Dihedral  Twist  Twist_Location  tip airfoil
    1  100   1216.78     1285       125089       27     0               0         0      0.25            as above
    2  1100  1285        724.522    1.10524e+06  27     0               0         0      0.25            as above

Propeller "Prop"
  location (X Y Z) 230 0 70, rotation 0 0 0
  bounding box size 95.3924 1853.68 167.464
  Design: Diameter=1850 NumBlade=2 Beta34=20 UseBeta34Flag=1 Feather=0 Rotate=0 Precone=0 ReverseFlag=0 FoldAngle=0 PropMode=0 AF=133.292 CLi=0.540149 Chord=0.169215 Solidity=0.107725 ConstructXoC=0.5 FeatherAxisXoC=0.5 FeatherOffsetXoC=0
  cross sections:
    n  RadiusFrac  shape
    0  0.113514    ellipse Ellipse_Height=37.685 Ellipse_Width=75.3699
    1  0.4         NACA 16-series Chord=169.954 IdealCl=0.7 ThickChord=0.144074
    2  1           NACA 16-series Chord=124.875 IdealCl=0.2 ThickChord=0.03
  Chord along r/R (cubic Bezier): 0.113514: 0.081481, 0.202342: 0.13, 0.291171: 0.17, 0.38: 0.18, 0.453333: 0.195, 0.526667: 0.195, 0.6: 0.2, 0.666667: 0.195, 0.733333: 0.195, 0.8: 0.175, 0.866667: 0.17, 0.933333: 0.16, 1: 0.135
  Twist along r/R (PCHIP): 0.113514: 46.75, 0.75: 20, 1: 13
  Thick along r/R (cubic Bezier): 0.113514: 0.5, 0.175676: 0.3, 0.237838: 0.225, 0.3: 0.2, 0.4: 0.125, 0.5: 0.115, 0.6: 0.1, 0.733333: 0.075, 0.866667: 0.055, 1: 0.03
  CLI along r/R (cubic Bezier): 0.113514: 0, 0.209009: 0.7, 0.304505: 0.7, 0.4: 0.7, 0.466667: 0.7, 0.533333: 0.7, 0.6: 0.7, 0.733333: 0.7, 0.866667: 0.7, 1: 0.2

VSPAERO settings (reference component "Wing"): Sref=1.11718e+07 bref=7710 cref=1449 Xcg=0 Ycg=0 Zcg=0 AlphaStart=0 AlphaEnd=10 AlphaNpts=3 BetaStart=0 BetaEnd=0 BetaNpts=1 MachStart=0.1 MachEnd=0 MachNpts=1 ReCref=1e+07 Vinf=100 Rho=0.002377
