OpenVSP model (file version 4), 2 components.
Geometry view with OpenVSP parameter names; values to 6 digits, angles in degrees, lengths in the model's unit.
Overall bounding box: X_Min=-1.07941e-05 X_Len=148.4 Y_Min=-106.5 Y_Len=213 Z_Min=-12.4741 Z_Len=33.9304

Wing "Wing_Body"
  location (X Y Z) 0 0 0, rotation 0 0 0
  symmetric about XZ
  bounding box size 147.977 213 19.1003
  totals: TotalSpan=213.24 TotalProjectedSpan=213 TotalChord=62.517 TotalArea=9983.84
  root: chord 147.977, twist 0, airfoil file "N2A EXT 0 Airfoil"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 ThickChord=0.123903
  sections:
    n   Span    Root_Chord  Tip_Chord  Area     Sweep    Sweep_Location  Dihedral  Twist  Twist_Location  tip airfoil
    1   0.863   147.977     147.689    127.58   8.1156   0               0.0094    0      0               airfoil file "N2A EXT 10.3563 Airfoil"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 ThickChord=0.12419
    2   0.863   147.689     147.176    127.234  22.7003  0               -0.0282   0      0               airfoil file "N2A EXT 20.7126 Airfoil"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 ThickChord=0.124708
    3   0.863   147.176     146.43     126.691  34.9651  0               -0.1754   0      0               airfoil file "N2A EXT 31.0688 Airfoil"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 ThickChord=0.125384
    4   0.863   146.43      145.444    125.944  44.5809  0               -0.4348   0      0               airfoil file "N2A EXT 41.4251 Airfoil"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 ThickChord=0.126145
    5   1.9124  145.444     142.362    275.2    55.5775  0               -1.1063   0      0               airfoil file "N2A EXT 64.3699 Airfoil"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 ThickChord=0.127774
    6   2.3135  142.362     136.964    323.111  65.3137  0               3.921     0      0               airfoil file "N2A EXT 92.0669 Airfoil"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 ThickChord=0.128706
    7   2.6947  136.964     128.77     358.037  70.6288  0               4.3174    0      0               airfoil file "N2A EXT 124.3111 Airfoil"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 ThickChord=0.127916
    8   3.0509  128.77      118.021    376.467  72.821   0               3.2465    0      0               airfoil file "N2A EXT 160.863 Airfoil"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 ThickChord=0.124606
    9   3.3846  118.021     105.71     378.62   72.6124  0               2.1611    0      0               airfoil file "N2A EXT 201.4495 Airfoil"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 ThickChord=0.117917
    10  3.697   105.71      93.443     368.135  69.3651  0               -2.669    0      0               airfoil file "N2A EXT 245.7658 Airfoil"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 ThickChord=0.107612
    11  3.9765  93.443      81.8848    348.596  63.9025  0               -0.9926   0      0               airfoil file "N2A EXT 293.4765 Airfoil"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 ThickChord=0.094687
    12  0.5005  81.8848     80.5824    40.6574  60.368   0               2.4327    0      0               airfoil file "N2A EXT 299.4765 Airfoil"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 ThickChord=0.093027
    13  0.4414  80.5824     79.0697    35.2352  59.6908  0               6.2754    0      0               airfoil file "N2A EXT 304.7417 Airfoil"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 ThickChord=0.0918
    14  1.0483  79.0697     68.6734    77.4395  58.7005  0               8.0089    0      0               airfoil file "N2A EXT 317.1981 Airfoil"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 ThickChord=0.097279
    15  1.0958  68.6734     61.6064    71.3803  57.3795  0               8.6342    0      0               airfoil file "N2A EXT 330.1981 Airfoil"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 ThickChord=0.099079
    16  1.1825  61.6064     57.6144    70.4893  56.114   0               8.9069    0      0               airfoil file "N2A EXT 344.2174 Airfoil"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 ThickChord=0.095715
    17  4.4801  57.6144     47.5265    235.521  53.3757  0               6.8225    0      0               airfoil file "N2A EXT 397.5974 Airfoil"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 ThickChord=0.085641
    18  4.6454  47.5265     38.6663    200.2    48.8665  0               4.0975    0      0               airfoil file "N2A EXT 453.1995 Airfoil"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 ThickChord=0.083811
    19  4.7912  38.6663     31.9035    169.057  42.6215  0               3.5571    0      0               airfoil file "N2A EXT 510.5832 Airfoil"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 ThickChord=0.083559
    20  4.892   31.9035     27.5149    145.337  34.9929  0               0.4395    0      0               airfoil file "N2A EXT 569.2855 Airfoil"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 ThickChord=0.083271
    21  4.9619  27.5149     24.7953    129.779  29.2115  0               0.8148    0      0               airfoil file "N2A EXT 628.8224 Airfoil"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 ThickChord=0.083316
    22  4.9893  24.7953     22.8797    118.932  27.2235  0               0.7496    0      0               airfoil file "N2A EXT 688.6893 Airfoil"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 ThickChord=0.083341
    23  4.9731  22.8797     21.2756    109.794  27.692   0               0.6952    0      0               airfoil file "N2A EXT 748.3618 Airfoil"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 ThickChord=0.083364
    24  4.912   21.2756     19.8297    100.955  27.654   0               0.341     0      0               airfoil file "N2A EXT 807.3053 Airfoil"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 ThickChord=0.083382
    25  4.8035  19.8297     18.4159    91.8564  27.6518  0               0.2917    0      0               airfoil file "N2A EXT 864.946 Airfoil"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 ThickChord=0.083409
    26  4.6446  18.4159     17.0489    82.3599  27.6525  0               0.3207    0      0               airfoil file "N2A EXT 920.6807 Airfoil"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 ThickChord=0.083439
    27  4.4331  17.0489     15.744     72.6871  27.6534  0               0.3067    0      0               airfoil file "N2A EXT 973.8772 Airfoil"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 ThickChord=0.083477
    28  4.1599  15.744      14.5621    63.0352  27.2036  0               0.3651    0      0               airfoil file "N2A EXT 1023.7946 Airfoil"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 ThickChord=0.083519
    29  3.8324  14.5621     13.3908    53.5633  28.161   0               0.3647    0      0               airfoil file "N2A EXT 1069.7822 Airfoil"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 ThickChord=0.083572
    30  2.4684  13.3908     12.6644    32.1573  27.6469  0               0.283     0      0               airfoil file "N2A EXT 1099.4029 Airfoil"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 ThickChord=0.083614
    31  2.4665  12.6644     11.938     30.3409  27.6659  0               0.3001    0      0               airfoil file "N2A EXT 1129.0004 Airfoil"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 ThickChord=0.083662
    32  2.4671  11.938      11.2116    28.5562  27.6614  0               0.2733    0      0               airfoil file "N2A EXT 1158.6049 Airfoil"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 ThickChord=0.083719
    33  2.4673  11.2116     10.4851    26.7661  27.6594  0               0.3044    0      0               airfoil file "N2A EXT 1188.2123 Airfoil"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 ThickChord=0.083784
    34  6.149   10.4851     8.6738     58.904   27.6663  0               0.1902    0      0               airfoil file "N2A EXT 1262 Airfoil"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 ThickChord=0.084036
    35  1.3333  8.6738      8.2811     11.303   27.663   0               0.1912    0      0               airfoil file "N2A EXT 1278 Airfoil"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 ThickChord=0.084117

Wing "Vertical_Tails"
  location (X Y Z) 120 25 0.17, rotation 0 0 0
  symmetric about XZ
  bounding box size 28.3999 57.428 22.0832
  totals: TotalSpan=42.7761 TotalProjectedSpan=7.42798 TotalChord=12.5702 TotalArea=537.704
  root: chord 17.7041, twist 0, NACA 4-series Camber=0 CamberLoc=0.5 ThickChord=0.09
  sections:
    n   Span     Root_Chord  Tip_Chord  Area     Sweep  Sweep_Location  Dihedral  Twist  Twist_Location  tip airfoil
    1   1.06943  17.7041     17.1907    18.6588  40.7   0.25            80        0      0               as above
    2   1.0694   17.1907     16.6773    18.1092  40.7   0.25            80        0      0               as above
    3   1.0694   16.6773     16.1639    17.5602  40.7   0.25            80        0      0               as above
    4   1.0694   16.1639     15.6505    17.0112  40.7   0.25            80        0      0               as above
    5   1.0694   15.6505     15.1371    16.4622  40.7   0.25            80        0      0               as above
    6   1.0694   15.1371     14.6238    15.9132  40.7   0.25            80        0      0               as above
    7   1.0694   14.6238     14.1104    15.3641  40.7   0.25            80        0      0               as above
    8   1.0694   14.1104     13.597     14.8151  40.7   0.25            80        0      0               as above
    9   1.0694   13.597      13.0836    14.2661  40.7   0.25            80        0      0               as above
    10  1.0694   13.0836     12.5702    13.7171  40.7   0.25            80        0      0               as above
    11  1.0694   12.5702     12.0568    13.1681  40.7   0.25            80        0      0               as above
    12  1.0694   12.0568     11.5434    12.619   40.7   0.25            80        0      0               as above
    13  1.0694   11.5434     11.03      12.07    40.7   0.25            80        0      0               as above
    14  1.0694   11.03       10.5166    11.521   40.7   0.25            80        0      0               as above
    15  1.0694   10.5166     10.0032    10.972   40.7   0.25            80        0      0               as above
    16  1.0694   10.0032     9.48986    10.423   40.7   0.25            80        0      0               as above
    17  1.0694   9.48986     8.97647    9.87395  40.7   0.25            80        0      0               as above
    18  1.0694   8.97647     8.46308    9.32493  40.7   0.25            80        0      0               as above
    19  1.0694   8.46308     7.94969    8.77591  40.7   0.25            80        0      0               as above
    20  1.0694   7.94969     7.4363     8.22689  40.7   0.25            80        0      0               NACA 4-series Camber=0 CamberLoc=0.5 ThickChord=0.06
