OpenVSP model (file version 5), 82 components.
Geometry view with OpenVSP parameter names; values to 6 digits, angles in degrees, lengths in the model's unit.
Overall bounding box: X_Min=0 X_Len=29.933 Y_Min=-24.8868 Y_Len=50.3812 Z_Min=-0.2 Z_Len=16.8455

Blank "OLDOrigin"
  location (X Y Z) 0 0 0, rotation 0 0 0

Blank "NDARC AeroCenter", child of "OLDOrigin"
  location (X Y Z) 11.5 0 8.5, rotation 0 0 0

Blank "Wing_1_pivot", child of "NDARC AeroCenter"
  location (X Y Z) 11.3649 0 8.5, rotation 0 0 0; relative location -0.135138 0 0, rotation 0 0 0

Wing "Wing_1", child of "Wing_1_pivot"
  location (X Y Z) 8.89526 0 8.5, rotation 0 0 0; relative location -2.4696 0 0, rotation 0 0 0
  symmetric about XZ
  bounding box size 6.44057 44.1319 0.601629
  totals: TotalSpan=43.7189 TotalProjectedSpan=43.7189 TotalChord=2.84915 TotalArea=124.678 TotalAR=15.3302 RelativeTwistFlag=1
  root: chord 3.33495, twist 0, airfoil file "GAW-1-18t-MOD MODIFIED to 18% THICK ABOUT CAMBER LINE: NASA/LANGLEY LS(1)-0417 (GA(W)-1) AIRFOIL"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 BaseThickChord=0.180149 ThickChord=0.180149
  sections:
    n  Span     Root_Chord  Tip_Chord  Area     Sweep  Sweep_Location  Dihedral  Twist  Twist_Location  tip airfoil
    1  7.41036  3.33495     3.03147    23.5887  10     0.25            0         0      0.7             as above
    2  7.21362  3.03147     2.6813     20.6049  10     0.25            0         0      0.7             as above
    3  7.23548  2.6813      2.33446    18.1457  10     0.25            0         0      0.7             as above
  SS_Control "SS_CONT_0": UStart=0.67 UEnd=0.799 Length_C_Start=0.33 Length_C_End=0.33 Length_Start=0.844776 Length_End=0.770952 LE_Flag=0 Surf_Type=2
  SS_Control "SS_CONT_1": UStart=0.299 UEnd=0.669 Length_C_Start=0.25 Length_C_End=0.25 Length_Start=0.796188 Length_End=0.640415 LE_Flag=0 Surf_Type=2

Blank "Rotor_5_hub", child of "Wing_1"
  location (X Y Z) 7.56793 7.41036 8.13869, rotation 0 0 0; relative location -1.32733 7.41036 -0.361313, rotation 0 0 0
  Mass: Point_Mass=0.8827 Point_Mass_Flag=1

Blank "EngineGroup_5", child of "Rotor_5_hub"
  location (X Y Z) 7.56793 7.41036 8.13869, rotation 0 0 0; relative location 0 0 0, rotation 0 0 0
  Mass: Point_Mass=3.279 Point_Mass_Flag=1

Blank "Propulsion_5", child of "Rotor_5_hub"
  location (X Y Z) 7.56793 7.41036 8.13869, rotation 0 0 0; relative location 0 0 0, rotation 0 0 0
  Mass: Point_Mass=0 Point_Mass_Flag=1

Fuselage "Motor_5", child of "Rotor_5_hub"
  location (X Y Z) 8.11793 7.41036 8.13869, rotation 0 0 0; relative location 0.55 0 0, rotation 0 0 0
  bounding box size 0.37 1.14 1.14
  Design: Length=0.37
  cross sections:
    n  XLocPercent  YLocPercent  ZLocPercent  shape
    0  0            0            0            point
    1  0.013587     0            0            circle Circle_Diameter=1.14
    2  0.986413     0            0            as above
    3  1            0            0            point

Fuselage "Rotor_5_support", child of "Rotor_5_hub"
  location (X Y Z) 6.46793 7.41036 8.13869, rotation 0 0 0; relative location -1.1 0 0, rotation 0 0 0
  bounding box size 5.9 1.32425 1.32425
  Design: Length=5.9
  cross sections:
    n  XLocPercent  YLocPercent  ZLocPercent  shape
    0  0            0            0            point
    1  0.152542     0            0            circle Circle_Diameter=1.26
    2  0.277966     0            0            as above
    3  0.347458     0            0            as above
    4  0.728814     0            0            circle Circle_Diameter=1
    5  1            0            0.0677966    circle Circle_Diameter=0

Propeller "Optimum_Hovering_Rotor_Nb_5", child of "Rotor_5_hub"
  location (X Y Z) 7.56793 7.41036 8.13869, rotation 0 0 0; relative location 0 0 0, rotation 0 0 0
  bounding box size 0.488823 6.66231 7.00512
  Design: Diameter=7.27 NumBlade=5 Beta34=16.7432 UseBeta34Flag=0 Feather=0 Rotate=0 Precone=0 ReverseFlag=0 FoldAngle=0 PropMode=0 AF=87.8832 CLi=0 Chord=0.14207 Solidity=0.226112 ConstructXoC=0.5 FeatherAxisXoC=0.5 FeatherOffsetXoC=0
  cross sections:
    n  RadiusFrac  shape
    0  0.2         NACA 4-series Camber=0 CamberLoc=0.2 Chord=0.729072 ThickChord=0.12
    1  0.45        NACA 4-series Camber=0 CamberLoc=0.4 Chord=0.596166 ThickChord=0.12
    2  0.7         NACA 4-series Camber=0 CamberLoc=0.4 Chord=0.463264 ThickChord=0.12
    3  1           NACA 4-series Camber=0 CamberLoc=0.4 Chord=0.303784 ThickChord=0.12
  Chord along r/R (PCHIP): 0.2: 0.20057, 0.22051: 0.19757, 0.24103: 0.19457, 0.26154: 0.19157, 0.28205: 0.18857, 0.30256: 0.18557, 0.32308: 0.18257, 0.34359: 0.17957, 0.3641: 0.17657, 0.38462: 0.17357, 0.40513: 0.17057, 0.42564: 0.16757, 0.44615: 0.16457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
  Twist along r/R (PCHIP): 0.2: 41.627, 0.22051: 38.471, 0.24103: 35.851, 0.26154: 33.643, 0.28205: 31.756, 0.30256: 30.125, 0.32308: 28.7, 0.34359: 27.446, 0.3641: 26.334, 0.38462: 25.34, 0.40513: 24.446, 0.42564: 23.639, 0.44615: 22.906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
  Thick along r/R (linear): 0.2: 0.12, 0.45: 0.12, 0.7: 0.12, 1: 0.12

Blank "Rotor_3_hub", child of "Wing_1"
  location (X Y Z) 8.92743 14.624 8.13869, rotation 0 0 0; relative location 0.0321642 14.624 -0.361313, rotation 0 0 0
  Mass: Point_Mass=0.8827 Point_Mass_Flag=1

Blank "EngineGroup_3", child of "Rotor_3_hub"
  location (X Y Z) 8.92743 14.624 8.13869, rotation 0 0 0; relative location 0 0 0, rotation 0 0 0
  Mass: Point_Mass=3.279 Point_Mass_Flag=1

Blank "Propulsion_3", child of "Rotor_3_hub"
  location (X Y Z) 8.92743 14.624 8.13869, rotation 0 0 0; relative location 0 0 0, rotation 0 0 0
  Mass: Point_Mass=0 Point_Mass_Flag=1

Fuselage "Motor_3", child of "Rotor_3_hub"
  location (X Y Z) 9.47743 14.624 8.13869, rotation 0 0 0; relative location 0.55 0 0, rotation 0 0 0
  bounding box size 0.37 1.14 1.14
  Design: Length=0.37
  cross sections:
    n  XLocPercent  YLocPercent  ZLocPercent  shape
    0  0            0            0            point
    1  0.013587     0            0            circle Circle_Diameter=1.14
    2  0.986413     0            0            as above
    3  1            0            0            point

Fuselage "Rotor_3_support", child of "Rotor_3_hub"
  location (X Y Z) 7.82743 14.624 8.13869, rotation 0 0 0; relative location -1.1 0 0, rotation 0 0 0
  bounding box size 5.9 1.32425 1.32425
  Design: Length=5.9
  cross sections:
    n  XLocPercent  YLocPercent  ZLocPercent  shape
    0  0            0            0            point
    1  0.152542     0            0            circle Circle_Diameter=1.26
    2  0.277966     0            0            as above
    3  0.347458     0            0            as above
    4  0.728814     0            0            circle Circle_Diameter=1
    5  1            0            0.0677966    circle Circle_Diameter=0

Propeller "Optimum_Hovering_Rotor_Nb_5", child of "Rotor_3_hub"
  location (X Y Z) 8.92743 14.624 8.13869, rotation 0 0 0; relative location 0 0 0, rotation 0 0 0
  bounding box size 0.488823 6.66231 7.00512
  Design: Diameter=7.27 NumBlade=5 Beta34=16.7432 UseBeta34Flag=0 Feather=0 Rotate=0 Precone=0 ReverseFlag=0 FoldAngle=0 PropMode=0 AF=87.8832 CLi=0 Chord=0.14207 Solidity=0.226112 ConstructXoC=0.5 FeatherAxisXoC=0.5 FeatherOffsetXoC=0
  cross sections:
    n  RadiusFrac  shape
    0  0.2         NACA 4-series Camber=0 CamberLoc=0.2 Chord=0.729072 ThickChord=0.12
    1  0.45        NACA 4-series Camber=0 CamberLoc=0.4 Chord=0.596166 ThickChord=0.12
    2  0.7         NACA 4-series Camber=0 CamberLoc=0.4 Chord=0.463264 ThickChord=0.12
    3  1           NACA 4-series Camber=0 CamberLoc=0.4 Chord=0.303784 ThickChord=0.12
  blade curves as in "Optimum_Hovering_Rotor_Nb_5"

Blank "Rotor_1_hub", child of "Wing_1"
  location (X Y Z) 10.2899 21.8595 8.5, rotation 0 0 0; relative location 1.39468 21.8595 0, rotation 0 0 0
  Mass: Point_Mass=0.8827 Point_Mass_Flag=1

Blank "EngineGroup_1", child of "Rotor_1_hub"
  location (X Y Z) 10.2899 21.8595 8.5, rotation 0 0 0; relative location 0 0 0, rotation 0 0 0
  Mass: Point_Mass=3.279 Point_Mass_Flag=1

Blank "Propulsion_1", child of "Rotor_1_hub"
  location (X Y Z) 10.2899 21.8595 8.5, rotation 0 0 0; relative location 0 0 0, rotation 0 0 0
  Mass: Point_Mass=0 Point_Mass_Flag=1

Fuselage "Motor_1", child of "Rotor_1_hub"
  location (X Y Z) 10.8399 21.8595 8.5, rotation 0 0 0; relative location 0.55 0 0, rotation 0 0 0
  bounding box size 0.37 1.14 1.14
  Design: Length=0.37
  cross sections:
    n  XLocPercent  YLocPercent  ZLocPercent  shape
    0  0            0            0            point
    1  0.013587     0            0            circle Circle_Diameter=1.14
    2  0.986413     0            0            as above
    3  1            0            0            point

Fuselage "Rotor_1_support", child of "Rotor_1_hub"
  location (X Y Z) 9.18995 21.8595 8.5, rotation 0 0 0; relative location -1.1 0 0, rotation 0 0 0
  bounding box size 5.9 1.32425 1.32425
  Design: Length=5.9
  cross sections:
    n  XLocPercent  YLocPercent  ZLocPercent  shape
    0  0            0            0            point
    1  0.152542     0            0            circle Circle_Diameter=1.26
    2  0.277966     0            0            as above
    3  0.347458     0            0            as above
    4  0.728814     0            0            circle Circle_Diameter=1
    5  1            0            0            circle Circle_Diameter=0

Propeller "Optimum_Hovering_Rotor_Nb_5", child of "Rotor_1_hub"
  location (X Y Z) 10.2899 21.8595 8.5, rotation 0 0 0; relative location 0 0 0, rotation 0 0 0
  bounding box size 0.488823 6.66231 7.00512
  Design: Diameter=7.27 NumBlade=5 Beta34=16.7432 UseBeta34Flag=0 Feather=0 Rotate=0 Precone=0 ReverseFlag=0 FoldAngle=0 PropMode=0 AF=87.8832 CLi=0 Chord=0.14207 Solidity=0.226112 ConstructXoC=0.5 FeatherAxisXoC=0.5 FeatherOffsetXoC=0
  cross sections:
    n  RadiusFrac  shape
    0  0.2         NACA 4-series Camber=0 CamberLoc=0.2 Chord=0.729072 ThickChord=0.12
    1  0.45        NACA 4-series Camber=0 CamberLoc=0.4 Chord=0.596166 ThickChord=0.12
    2  0.7         NACA 4-series Camber=0 CamberLoc=0.4 Chord=0.463264 ThickChord=0.12
    3  1           NACA 4-series Camber=0 CamberLoc=0.4 Chord=0.303784 ThickChord=0.12
  blade curves as in "Optimum_Hovering_Rotor_Nb_5"

Blank "Rotor_6_hub", child of "Wing_1"
  location (X Y Z) 7.56793 -7.41036 8.13869, rotation 0 0 0; relative location -1.32733 -7.41036 -0.361313, rotation 0 0 0
  Mass: Point_Mass=0.8827 Point_Mass_Flag=1

Blank "EngineGroup_6", child of "Rotor_6_hub"
  location (X Y Z) 7.56793 -7.41036 8.13869, rotation 0 0 0; relative location 0 0 0, rotation 0 0 0
  Mass: Point_Mass=3.279 Point_Mass_Flag=1

Blank "Propulsion_6", child of "Rotor_6_hub"
  location (X Y Z) 7.56793 -7.41036 8.13869, rotation 0 0 0; relative location 0 0 0, rotation 0 0 0
  Mass: Point_Mass=0 Point_Mass_Flag=1

Fuselage "Motor_6", child of "Rotor_6_hub"
  location (X Y Z) 8.11793 -7.41036 8.13869, rotation 0 0 0; relative location 0.55 0 0, rotation 0 0 0
  bounding box size 0.37 1.14 1.14
  Design: Length=0.37
  cross sections:
    n  XLocPercent  YLocPercent  ZLocPercent  shape
    0  0            0            0            point
    1  0.013587     0            0            circle Circle_Diameter=1.14
    2  0.986413     0            0            as above
    3  1            0            0            point

Fuselage "Rotor_6_support", child of "Rotor_6_hub"
  location (X Y Z) 6.46793 -7.41036 8.13869, rotation 0 0 0; relative location -1.1 0 0, rotation 0 0 0
  bounding box size 5.9 1.32425 1.32425
  Design: Length=5.9
  cross sections:
    n  XLocPercent  YLocPercent  ZLocPercent  shape
    0  0            0            0            point
    1  0.152542     0            0            circle Circle_Diameter=1.26
    2  0.277966     0            0            as above
    3  0.347458     0            0            as above
    4  0.728814     0            0            circle Circle_Diameter=1
    5  1            0            0.0677966    circle Circle_Diameter=0

Propeller "Optimum_Hovering_Rotor_Nb_5", child of "Rotor_6_hub"
  location (X Y Z) 7.56793 -7.41036 8.13869, rotation 0 0 0; relative location 0 0 0, rotation 0 0 0
  bounding box size 0.488823 6.66231 7.00512
  Design: Diameter=7.27 NumBlade=5 Beta34=16.7432 UseBeta34Flag=0 Feather=0 Rotate=0 Precone=0 ReverseFlag=1 FoldAngle=0 PropMode=0 AF=87.8832 CLi=0 Chord=0.14207 Solidity=0.226112 ConstructXoC=0.5 FeatherAxisXoC=0.5 FeatherOffsetXoC=0
  cross sections:
    n  RadiusFrac  shape
    0  0.2         NACA 4-series Camber=0 CamberLoc=0.2 Chord=0.729072 ThickChord=0.12
    1  0.45        NACA 4-series Camber=0 CamberLoc=0.4 Chord=0.596166 ThickChord=0.12
    2  0.7         NACA 4-series Camber=0 CamberLoc=0.4 Chord=0.463264 ThickChord=0.12
    3  1           NACA 4-series Camber=0 CamberLoc=0.4 Chord=0.303784 ThickChord=0.12
  blade curves as in "Optimum_Hovering_Rotor_Nb_5"

Blank "Rotor_4_hub", child of "Wing_1"
  location (X Y Z) 8.92743 -14.624 8.13869, rotation 0 0 0; relative location 0.0321642 -14.624 -0.361313, rotation 0 0 0
  Mass: Point_Mass=0.8827 Point_Mass_Flag=1

Blank "EngineGroup_4", child of "Rotor_4_hub"
  location (X Y Z) 8.92743 -14.624 8.13869, rotation 0 0 0; relative location 0 0 0, rotation 0 0 0
  Mass: Point_Mass=3.279 Point_Mass_Flag=1

Blank "Propulsion_4", child of "Rotor_4_hub"
  location (X Y Z) 8.92743 -14.624 8.13869, rotation 0 0 0; relative location 0 0 0, rotation 0 0 0
  Mass: Point_Mass=0 Point_Mass_Flag=1

Fuselage "Motor_4", child of "Rotor_4_hub"
  location (X Y Z) 9.47743 -14.624 8.13869, rotation 0 0 0; relative location 0.55 0 0, rotation 0 0 0
  bounding box size 0.37 1.14 1.14
  Design: Length=0.37
  cross sections:
    n  XLocPercent  YLocPercent  ZLocPercent  shape
    0  0            0            0            point
    1  0.013587     0            0            circle Circle_Diameter=1.14
    2  0.986413     0            0            as above
    3  1            0            0            point

Fuselage "Rotor_4_support", child of "Rotor_4_hub"
  location (X Y Z) 7.82743 -14.624 8.13869, rotation 0 0 0; relative location -1.1 0 0, rotation 0 0 0
  bounding box size 5.9 1.32425 1.32425
  Design: Length=5.9
  cross sections:
    n  XLocPercent  YLocPercent  ZLocPercent  shape
    0  0            0            0            point
    1  0.152542     0            0            circle Circle_Diameter=1.26
    2  0.277966     0            0            as above
    3  0.347458     0            0            as above
    4  0.728814     0            0            circle Circle_Diameter=1
    5  1            0            0.0677966    circle Circle_Diameter=0

Propeller "Optimum_Hovering_Rotor_Nb_5", child of "Rotor_4_hub"
  location (X Y Z) 8.92743 -14.624 8.13869, rotation 0 0 0; relative location 0 0 0, rotation 0 0 0
  bounding box size 0.488823 6.66231 7.00512
  Design: Diameter=7.27 NumBlade=5 Beta34=16.7432 UseBeta34Flag=0 Feather=0 Rotate=0 Precone=0 ReverseFlag=1 FoldAngle=0 PropMode=0 AF=87.8832 CLi=0 Chord=0.14207 Solidity=0.226112 ConstructXoC=0.5 FeatherAxisXoC=0.5 FeatherOffsetXoC=0
  cross sections:
    n  RadiusFrac  shape
    0  0.2         NACA 4-series Camber=0 CamberLoc=0.2 Chord=0.729072 ThickChord=0.12
    1  0.45        NACA 4-series Camber=0 CamberLoc=0.4 Chord=0.596166 ThickChord=0.12
    2  0.7         NACA 4-series Camber=0 CamberLoc=0.4 Chord=0.463264 ThickChord=0.12
    3  1           NACA 4-series Camber=0 CamberLoc=0.4 Chord=0.303784 ThickChord=0.12
  blade curves as in "Optimum_Hovering_Rotor_Nb_5"

Blank "Rotor_2_hub", child of "Wing_1"
  location (X Y Z) 10.2899 -21.8595 8.5, rotation 0 0 0; relative location 1.39468 -21.8595 0, rotation 0 0 0
  Mass: Point_Mass=0.8827 Point_Mass_Flag=1

Blank "EngineGroup_2", child of "Rotor_2_hub"
  location (X Y Z) 10.2899 -21.8595 8.5, rotation 0 0 0; relative location 0 0 0, rotation 0 0 0
  Mass: Point_Mass=3.279 Point_Mass_Flag=1

Blank "Propulsion_2", child of "Rotor_2_hub"
  location (X Y Z) 10.2899 -21.8595 8.5, rotation 0 0 0; relative location 0 0 0, rotation 0 0 0
  Mass: Point_Mass=0 Point_Mass_Flag=1

Fuselage "Motor_2", child of "Rotor_2_hub"
  location (X Y Z) 10.8399 -21.8595 8.5, rotation 0 0 0; relative location 0.55 0 0, rotation 0 0 0
  bounding box size 0.37 1.14 1.14
  Design: Length=0.37
  cross sections:
    n  XLocPercent  YLocPercent  ZLocPercent  shape
    0  0            0            0            point
    1  0.013587     0            0            circle Circle_Diameter=1.14
    2  0.986413     0            0            as above
    3  1            0            0            point

Fuselage "Rotor_2_support", child of "Rotor_2_hub"
  location (X Y Z) 9.18995 -21.8595 8.5, rotation 0 0 0; relative location -1.1 0 0, rotation 0 0 0
  bounding box size 5.9 1.32425 1.32425
  Design: Length=5.9
  cross sections:
    n  XLocPercent  YLocPercent  ZLocPercent  shape
    0  0            0            0            point
    1  0.152542     0            0            circle Circle_Diameter=1.26
    2  0.277966     0            0            as above
    3  0.347458     0            0            as above
    4  0.728814     0            0            circle Circle_Diameter=1
    5  1            0            0            circle Circle_Diameter=0

Propeller "Optimum_Hovering_Rotor_Nb_5", child of "Rotor_2_hub"
  location (X Y Z) 10.2899 -21.8595 8.5, rotation 0 0 0; relative location 0 0 0, rotation 0 0 0
  bounding box size 0.488823 6.66231 7.00512
  Design: Diameter=7.27 NumBlade=5 Beta34=16.7432 UseBeta34Flag=0 Feather=0 Rotate=0 Precone=0 ReverseFlag=1 FoldAngle=0 PropMode=0 AF=87.8832 CLi=0 Chord=0.14207 Solidity=0.226112 ConstructXoC=0.5 FeatherAxisXoC=0.5 FeatherOffsetXoC=0
  cross sections:
    n  RadiusFrac  shape
    0  0.2         NACA 4-series Camber=0 CamberLoc=0.2 Chord=0.729072 ThickChord=0.12
    1  0.45        NACA 4-series Camber=0 CamberLoc=0.4 Chord=0.596166 ThickChord=0.12
    2  0.7         NACA 4-series Camber=0 CamberLoc=0.4 Chord=0.463264 ThickChord=0.12
    3  1           NACA 4-series Camber=0 CamberLoc=0.4 Chord=0.303784 ThickChord=0.12
  blade curves as in "Optimum_Hovering_Rotor_Nb_5"

Blank "NDARC_CG", child of "Wing_1"
  location (X Y Z) 14.4185 0 5.8672, rotation 0 0 0; relative location 5.52322 0 -2.6328, rotation 0 0 0
  Mass: Point_Mass=6000 Point_Mass_Flag=1

Blank "Alt_CG", child of "Wing_1"
  location (X Y Z) 11.0983 0 7.0636, rotation 0 0 0; relative location 2.203 0 -1.4364, rotation 0 0 0
  Mass: Point_Mass=6000 Point_Mass_Flag=1

Blank "WingQuarterChord", child of "Wing_1"
  location (X Y Z) 9.82276 0 8.5, rotation 0 0 0; relative location 0.9275 0 0, rotation 0 0 0

Blank "Wing_1_AeroCenter", child of "Wing_1"
  location (X Y Z) 11.4383 0 8.5, rotation 0 0 0; relative location 2.543 0 0, rotation 0 0 0

Wing "Wing_2", child of "NDARC AeroCenter"
  location (X Y Z) 26.4612 0 13.1429, rotation 0 0 0; relative location 14.9612 0 4.64288, rotation 0 0 0
  symmetric about XZ
  bounding box size 3.47212 10.5732 0.626309
  totals: TotalSpan=10.0806 TotalProjectedSpan=10.0806 TotalChord=3.12458 TotalArea=31.4977 TotalAR=3.22624 RelativeTwistFlag=1
  root: chord 3.47175, twist 0, airfoil file "GAW-1-18t-MOD MODIFIED to 18% THICK ABOUT CAMBER LINE: NASA/LANGLEY LS(1)-0417 (GA(W)-1) AIRFOIL"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 BaseThickChord=0.180149 ThickChord=0.180149
  sections:
    n  Span     Root_Chord  Tip_Chord  Area     Sweep  Sweep_Location  Dihedral  Twist  Twist_Location  tip airfoil
    1  5.04032  3.47175     2.7774     15.7489  0      1               0         0      0.7             as above
  SS_Control "SS_CONT_0": UStart=0.67 UEnd=0.799 Length_C_Start=0.33 Length_C_End=0.33 Length_Start=0.91655 Length_End=0.91655 LE_Flag=0 Surf_Type=2
  SS_Control "SS_CONT_1": UStart=0.299 UEnd=0.669 Length_C_Start=0.4 Length_C_End=0.4 Length_Start=1.38871 Length_End=1.11097 LE_Flag=0 Surf_Type=2

Blank "Rotor_7_pivot", child of "Wing_2"
  location (X Y Z) 25.1683 0 13.8029, rotation 0 0 0; relative location -1.29287 0 0.66, rotation 0 0 0

Blank "Rotor_7_hub", child of "Rotor_7_pivot"
  location (X Y Z) 24.4457 5.04032 13.1429, rotation 0 0 0; relative location -0.722627 5.04032 -0.66, rotation 0 0 0
  Mass: Point_Mass=0.8827 Point_Mass_Flag=1

Blank "EngineGroup_7", child of "Rotor_7_hub"
  location (X Y Z) 24.4457 5.04032 13.1429, rotation 0 0 0; relative location 0 0 0, rotation 0 0 0
  Mass: Point_Mass=3.279 Point_Mass_Flag=1

Blank "Propulsion_7", child of "Rotor_7_hub"
  location (X Y Z) 24.4457 5.04032 13.1429, rotation 0 0 0; relative location 0 0 0, rotation 0 0 0
  Mass: Point_Mass=0 Point_Mass_Flag=1

Fuselage "Motor_7", child of "Rotor_7_hub"
  location (X Y Z) 24.9957 5.04032 13.1429, rotation 0 0 0; relative location 0.55 0 0, rotation 0 0 0
  bounding box size 0.37 1.14 1.14
  Design: Length=0.37
  cross sections:
    n  XLocPercent  YLocPercent  ZLocPercent  shape
    0  0            0            0            point
    1  0.013587     0            0            circle Circle_Diameter=1.14
    2  0.986413     0            0            as above
    3  1            0            0            point

Fuselage "Rotor_7_hub_rot", child of "Rotor_7_hub"
  location (X Y Z) 23.3387 5.04032 13.1429, rotation 0 0 0; relative location -1.107 0 0, rotation 0 0 0
  bounding box size 2 1.26 1.55179
  Design: Length=2
  cross sections:
    n  XLocPercent  YLocPercent  ZLocPercent  shape
    0  0            0            0            point
    1  0.45         0            0            circle Circle_Diameter=1.26
    2  1            0            0            as above

Propeller "Optimum_Hovering_Rotor_Nb_5", child of "Rotor_7_hub"
  location (X Y Z) 24.4457 5.04032 13.1429, rotation 0 0 0; relative location 0 0 0, rotation 0 0 0
  bounding box size 0.488823 6.66231 7.00512
  Design: Diameter=7.27 NumBlade=5 Beta34=16.7432 UseBeta34Flag=0 Feather=0 Rotate=0 Precone=0 ReverseFlag=0 FoldAngle=0 PropMode=0 AF=87.8832 CLi=0 Chord=0.14207 Solidity=0.226112 ConstructXoC=0.5 FeatherAxisXoC=0.5 FeatherOffsetXoC=0
  cross sections:
    n  RadiusFrac  shape
    0  0.2         NACA 4-series Camber=0 CamberLoc=0.2 Chord=0.729072 ThickChord=0.12
    1  0.45        NACA 4-series Camber=0 CamberLoc=0.4 Chord=0.596166 ThickChord=0.12
    2  0.7         NACA 4-series Camber=0 CamberLoc=0.4 Chord=0.463264 ThickChord=0.12
    3  1           NACA 4-series Camber=0 CamberLoc=0.4 Chord=0.303784 ThickChord=0.12
  blade curves as in "Optimum_Hovering_Rotor_Nb_5"

Blank "Rotor_8_pivot", child of "Wing_2"
  location (X Y Z) 25.1683 0 13.8029, rotation 0 0 0; relative location -1.29287 0 0.66, rotation 0 0 0

Blank "Rotor_8_hub", child of "Rotor_8_pivot"
  location (X Y Z) 24.4457 -5.04032 13.1429, rotation 0 0 0; relative location -0.722627 -5.04032 -0.66, rotation 0 0 0
  Mass: Point_Mass=0.8827 Point_Mass_Flag=1

Blank "EngineGroup_8", child of "Rotor_8_hub"
  location (X Y Z) 24.4457 -5.04032 13.1429, rotation 0 0 0; relative location 0 0 0, rotation 0 0 0
  Mass: Point_Mass=3.279 Point_Mass_Flag=1

Blank "Propulsion_8", child of "Rotor_8_hub"
  location (X Y Z) 24.4457 -5.04032 13.1429, rotation 0 0 0; relative location 0 0 0, rotation 0 0 0
  Mass: Point_Mass=0 Point_Mass_Flag=1

Fuselage "Motor_8", child of "Rotor_8_hub"
  location (X Y Z) 24.9957 -5.04032 13.1429, rotation 0 0 0; relative location 0.55 0 0, rotation 0 0 0
  bounding box size 0.37 1.14 1.14
  Design: Length=0.37
  cross sections:
    n  XLocPercent  YLocPercent  ZLocPercent  shape
    0  0            0            0            point
    1  0.013587     0            0            circle Circle_Diameter=1.14
    2  0.986413     0            0            as above
    3  1            0            0            point

Fuselage "Rotor_8_hub_rot", child of "Rotor_8_hub"
  location (X Y Z) 23.3387 -5.04032 13.1429, rotation 0 0 0; relative location -1.107 0 0, rotation 0 0 0
  bounding box size 2 1.26 1.55179
  Design: Length=2
  cross sections:
    n  XLocPercent  YLocPercent  ZLocPercent  shape
    0  0            0            0            point
    1  0.45         0            0            circle Circle_Diameter=1.26
    2  1            0            0            as above

Propeller "Optimum_Hovering_Rotor_Nb_5", child of "Rotor_8_hub"
  location (X Y Z) 24.4457 -5.04032 13.1429, rotation 0 0 0; relative location 0 0 0, rotation 0 0 0
  bounding box size 0.488823 6.66231 7.00512
  Design: Diameter=7.27 NumBlade=5 Beta34=16.7432 UseBeta34Flag=0 Feather=0 Rotate=0 Precone=0 ReverseFlag=1 FoldAngle=0 PropMode=0 AF=87.8832 CLi=0 Chord=0.14207 Solidity=0.226112 ConstructXoC=0.5 FeatherAxisXoC=0.5 FeatherOffsetXoC=0
  cross sections:
    n  RadiusFrac  shape
    0  0.2         NACA 4-series Camber=0 CamberLoc=0.2 Chord=0.729072 ThickChord=0.12
    1  0.45        NACA 4-series Camber=0 CamberLoc=0.4 Chord=0.596166 ThickChord=0.12
    2  0.7         NACA 4-series Camber=0 CamberLoc=0.4 Chord=0.463264 ThickChord=0.12
    3  1           NACA 4-series Camber=0 CamberLoc=0.4 Chord=0.303784 ThickChord=0.12
  blade curves as in "Optimum_Hovering_Rotor_Nb_5"

Fuselage "Rotor_7_support", child of "Wing_2"
  location (X Y Z) 23.3387 5.04032 13.1429, rotation 0 0 0; relative location -3.1225 5.04032 0, rotation 0 0 0
  bounding box size 5.9 1.32425 1.32425
  Design: Length=5.9
  cross sections:
    n  XLocPercent  YLocPercent  ZLocPercent  shape
    0  0            0            0            point
    1  0.152542     0            0            circle Circle_Diameter=1.26
    2  0.277966     0            0            as above
    3  0.347458     0            0            as above
    4  0.728814     0            0            circle Circle_Diameter=1
    5  1            0            0            circle Circle_Diameter=0

Fuselage "Rotor_8_support", child of "Wing_2"
  location (X Y Z) 23.3387 -5.04032 13.1429, rotation 0 0 0; relative location -3.1225 -5.04032 0, rotation 0 0 0
  bounding box size 5.9 1.32425 1.32425
  Design: Length=5.9
  cross sections:
    n  XLocPercent  YLocPercent  ZLocPercent  shape
    0  0            0            0            point
    1  0.152542     0            0            circle Circle_Diameter=1.26
    2  0.277966     0            0            as above
    3  0.347458     0            0            as above
    4  0.728814     0            0            circle Circle_Diameter=1
    5  1            0            0            circle Circle_Diameter=0

Wing "Tail_1", child of "Wing_2"
  location (X Y Z) 21.983 0 8.228, rotation 90 0 0; relative location 4.9 -7.95 0, rotation 0 0 90
  bounding box size 7.16385 1.17494 4.9
  totals: TotalSpan=4.9 TotalProjectedSpan=4.9 TotalChord=3.62 TotalArea=15.9154 TotalAR=1.5086
  root: chord 5.87239, twist 0, NACA 4-series Camber=0 CamberLoc=0.2 ThickChord=0.2
  sections:
    n  Span      Root_Chord  Tip_Chord  Area     Sweep  Sweep_Location  Dihedral  Twist  Twist_Location  tip airfoil
    1  0.984878  5.87239     3.80882    4.7674   15     1               0         0      0.25            as above
    2  0.368613  3.80882     3.46256    1.34016  15     1               0         0      0.25            as above
    3  0.448719  3.46256     3.17401    1.48898  15     1               0         0      0.25            as above
    4  3.09779   3.17401     2.19683    8.31887  15     1               0         0      0.25            as above
  SS_Control "SS_CONT_0": UStart=0.33 UEnd=0.833333 Length_C_Start=0.3 Length_C_End=0.3 Length_Start=1.14859 Length_End=0.652602 LE_Flag=0 Surf_Type=2

Blank "Nose"
  location (X Y Z) 1.88864 0 4.24937, rotation 0 0 0

Blank "Ref_Geometry", child of "Nose"
  location (X Y Z) 1.88864 0 4.24937, rotation 0 0 0; relative location 0 0 0, rotation 0 0 0

Wing "LandingGear_015.NoseStrutFairing", child of "Ref_Geometry"
  location (X Y Z) 4.23913 0 2.5, rotation -90 0 0
  symmetric about XZ
  bounding box size 1.40192 0.104475 1.98071
  totals: TotalSpan=3 TotalProjectedSpan=3 TotalChord=0.875 TotalArea=2.625 TotalAR=3.42857
  root: chord 0.75, twist 0, NACA 4-series Camber=0 CamberLoc=0.2 ThickChord=0.1
  sections:
    n  Span  Root_Chord  Tip_Chord  Area    Sweep  Sweep_Location  Dihedral  Twist  Twist_Location  tip airfoil
    1  1.5   0.75        1          1.3125  15     0               0         0      0.25            as above

Wing "LandingGear_070.MainGearFairing", child of "Ref_Geometry"
  location (X Y Z) 12.7174 1.84783 2.3913, rotation -59.7608 0 0
  symmetric about XZ
  bounding box size 2.91415 5.31344 2.48196
  totals: TotalSpan=4.31256 TotalProjectedSpan=4.07984 TotalChord=1.85898 TotalArea=8.25095 TotalAR=2.01736
  root: chord 2.21615, twist 0, NACA 4-series Camber=0 CamberLoc=0.2 ThickChord=0.18
  sections:
    n  Span      Root_Chord  Tip_Chord  Area     Sweep    Sweep_Location  Dihedral  Twist  Twist_Location  tip airfoil
    1  1.28776   2.21615     2.0599     2.75326  22.3636  0               0         0      0.25            as above
    2  0.868518  2.0599      1.1        1.37221  55.9318  0               -30       0      0.25            as above

Fuselage "Fuselage", child of "Ref_Geometry"
  location (X Y Z) 1.88864 0 4.24937, rotation 0 0 0; relative location 0 0 0, rotation 0 0 0
  bounding box size 26 6.29814 6.96145
  Design: Length=26
  cross sections:
    n  XLocPercent  YLocPercent  ZLocPercent  shape
    0  0            0            -0.035       point
    1  0.024145     0            -0.03        general fuselage BotStr=0.827589 BotTanAngle=90 CornerRad=0 Height=2.16001 LowStr=0.81429 MaxWidthLoc=0.024812 TopStr=1.10925 TopTanAngle=90 UpStr=0.692274 Width=2.49601
    2  0.16         0            0.0116947    general fuselage BotStr=1.19151 BotTanAngle=90 CornerRad=0 Height=5.28002 LowStr=1.27 MaxWidthLoc=-0.117303 TopStr=0.342421 TopTanAngle=90 UpStr=1.7302 Width=5.28002
    3  0.3          0            0.036        general fuselage BotStr=1.1383 BotTanAngle=90 CornerRad=0 Height=6.62403 LowStr=1.42286 MaxWidthLoc=-0.190324 TopStr=0.651397 TopTanAngle=90 UpStr=1.74091 Width=6.04802
    4  0.5          0            0.039        general fuselage BotStr=1.27659 BotTanAngle=90 CornerRad=0 Height=6.61443 LowStr=1.42286 MaxWidthLoc=-0.190324 TopStr=1.00146 TopTanAngle=90 UpStr=2 Width=6.04802
    5  0.58         0            0.0484231    general fuselage BotStr=0.781013 BotTanAngle=90 CornerRad=0 Height=6.14402 LowStr=1.5 MaxWidthLoc=-0.125562 TopStr=1.25 TopTanAngle=90 UpStr=1.50472 Width=5.23202
    6  0.986        0            0.138462     general fuselage BotStr=0.781013 BotTanAngle=90 CornerRad=0 Height=0.720003 LowStr=1.5 MaxWidthLoc=-0.12556 TopStr=1.25 TopTanAngle=90 UpStr=1.50472 Width=0.720003
    7  1            0            0.138462     point
    8  1            0            0.138462     point

Fuselage "EngineGroup_9_PWPT61200hp", child of "Fuselage"
  location (X Y Z) 15.2174 0 5.86957, rotation 0 0 0
  bounding box size 3.23706 1.583 1.583
  Design: Length=3
  cross sections:
    n  XLocPercent  YLocPercent  ZLocPercent  shape
    0  0            0            0            point
    1  0.05         0            0            ellipse Ellipse_Height=1.583 Ellipse_Width=1.583
    2  0.5          0            0            as above
    3  0.95         0            0            as above
    4  1            0            0            point

Blank "Systems_030.ECS", child of "Fuselage"
  location (X Y Z) 8.7934 0 4.24937, rotation 0 0 0; relative location 6.90476 0 0, rotation 0 0 0

Blank "Systems_030.furnishings", child of "Fuselage"
  location (X Y Z) 11.8886 0 4.24937, rotation 0 0 0; relative location 10 0 0, rotation 0 0 0

Fuselage "FuelTank_1", child of "Fuselage"
  location (X Y Z) 11.7799 0 7.61893, rotation 0 0 0
  bounding box size 3.15 1 1
  Design: Length=3.15
  cross sections:
    n  XLocPercent  YLocPercent  ZLocPercent  shape
    0  0            0            0            point
    1  0.013587     0            0            rounded rectangle RoundRectXSec_Radius=0.1 RoundedRect_Height=1 RoundedRect_Width=1
    2  0.5          0            0            as above
    3  0.986413     0            0            as above
    4  1            0            0            point

Fuselage "FuelTank_2_full", child of "Fuselage"
  location (X Y Z) 15.0952 0 3.92328, rotation 0 0 0
  bounding box size 1.25 2 2
  Design: Length=1.25
  cross sections:
    n  XLocPercent  YLocPercent  ZLocPercent  shape
    0  0            0            0            point
    1  0.013587     0            0            rounded rectangle RoundRectXSec_Radius=0.1 RoundedRect_Height=2 RoundedRect_Width=2
    2  0.5          0            0            as above
    3  0.986413     0            0            as above
    4  1            0            0            point

Blank "Systems_040.everythingelse", child of "Fuselage"
  location (X Y Z) 10 0 4.52381, rotation 0 0 0

Blank "EngineGroup_10_generator", child of "Fuselage"
  location (X Y Z) 14.7458 0 6.39222, rotation 0 0 0; relative location 12.8571 0 2.14286, rotation 0 0 0
  Mass: Point_Mass=10.257 Point_Mass_Flag=1

Human "HumanGeom", child of "Fuselage"
  location (X Y Z) 7.30655 -1.3 4.69713, rotation 0 0 0; relative location 5.41791 -1.3 0.447761, rotation 0 0 0
  mass: Density=69.3345 Shell_Flag=0 Mass_Area=1 Mass_Prior=0
  Anthropometric: Age=30 AutoDensity=1 BMI=27.7 BMI_pct=0.5 GenderFlag=0 LenUnit=4 Mass=205.037 MassUnit=3 SitFrac=0.5 Stature=6.01166 Stature_pct=0.83535 Volume=2.95722

Human "HumanGeom", child of "Fuselage"
  location (X Y Z) 7.30655 1.3 4.69713, rotation 0 0 0; relative location 5.41791 1.3 0.447761, rotation 0 0 0
  mass: Density=69.3345 Shell_Flag=0 Mass_Area=1 Mass_Prior=0
  Anthropometric: Age=30 AutoDensity=1 BMI=27.7 BMI_pct=0.5 GenderFlag=0 LenUnit=4 Mass=205.037 MassUnit=3 SitFrac=0.5 Stature=6.01166 Stature_pct=0.83535 Volume=2.95722

Human "HumanGeom", child of "Fuselage"
  location (X Y Z) 10.1399 1.3 4.69713, rotation 0 0 0; relative location 8.25124 1.3 0.447761, rotation 0 0 0
  mass: Density=69.3345 Shell_Flag=0 Mass_Area=1 Mass_Prior=0
  Anthropometric: Age=30 AutoDensity=1 BMI=27.7 BMI_pct=0.5 GenderFlag=0 LenUnit=4 Mass=205.037 MassUnit=3 SitFrac=0.5 Stature=6.01166 Stature_pct=0.83535 Volume=2.95722

Human "HumanGeom", child of "Fuselage"
  location (X Y Z) 10.1399 -1.3 4.69713, rotation 0 0 0; relative location 8.25124 -1.3 0.447761, rotation 0 0 0
  mass: Density=69.3345 Shell_Flag=0 Mass_Area=1 Mass_Prior=0
  Anthropometric: Age=30 AutoDensity=1 BMI=27.7 BMI_pct=0.5 GenderFlag=0 LenUnit=4 Mass=205.037 MassUnit=3 SitFrac=0.5 Stature=6.01166 Stature_pct=0.83535 Volume=2.95722

Human "HumanGeom", child of "Fuselage"
  location (X Y Z) 12.9732 1.3 4.69713, rotation 0 0 0; relative location 11.0846 1.3 0.447761, rotation 0 0 0
  mass: Density=69.3345 Shell_Flag=0 Mass_Area=1 Mass_Prior=0
  Anthropometric: Age=30 AutoDensity=1 BMI=27.7 BMI_pct=0.5 GenderFlag=0 LenUnit=4 Mass=205.037 MassUnit=3 SitFrac=0.5 Stature=6.01166 Stature_pct=0.83535 Volume=2.95722

Human "HumanGeom", child of "Fuselage"
  location (X Y Z) 12.9732 -1.3 4.69713, rotation 0 0 0; relative location 11.0846 -1.3 0.447761, rotation 0 0 0
  mass: Density=69.3345 Shell_Flag=0 Mass_Area=1 Mass_Prior=0
  Anthropometric: Age=30 AutoDensity=1 BMI=27.7 BMI_pct=0.5 GenderFlag=0 LenUnit=4 Mass=205.037 MassUnit=3 SitFrac=0.5 Stature=6.01166 Stature_pct=0.83535 Volume=2.95722

Pod "LandingGear_005.fronttire"
  location (X Y Z) 5.1 -0.238095 0.952381, rotation 0 0 90
  bounding box size 1.2 0.6 1.2
  Design: FineRatio=1 Length=0.6

Pod "LandingGear_010.maintires"
  location (X Y Z) 15.4571 2.3 0.4, rotation 0 0 90
  symmetric about XZ
  bounding box size 1.2 5.8 1.2
  Design: FineRatio=1 Length=0.6
