OpenVSP model (file version 4), 33 components.
Geometry view with OpenVSP parameter names; values to 6 digits, angles in degrees, lengths in the model's unit.
Overall bounding box: X_Min=0 X_Len=365.32 Y_Min=-219.741 Y_Len=439.482 Z_Min=0 Z_Len=131.662

Blank "Origin"
  location (X Y Z) 0 0 0, rotation 0 0 0

Fuselage "Fuselage", child of "Origin"
  location (X Y Z) 22.6637 0 50.9924, rotation 0 0 0
  bounding box size 328.715 49.3528 55.7551
  Design: Length=328.715
  cross sections:
    n  XLocPercent  YLocPercent  ZLocPercent  shape
    0  0            0            0            point
    1  0.024145     0            -0.002082    general fuselage BotStr=0.827589 BotTanAngle=90 CornerRad=0 Height=15.505 LowStr=0.81429 MaxWidthLoc=0.024812 TopStr=1.10925 TopTanAngle=90 UpStr=0.692274 Width=17.6909
    2  0.121627     0            0.016498     general fuselage BotStr=1.19151 BotTanAngle=90 CornerRad=0 Height=33.5102 LowStr=1.27081 MaxWidthLoc=-0.117303 TopStr=0.342421 TopTanAngle=90 UpStr=1.7302 Width=37.1263
    3  0.296705     0            0.04395      general fuselage BotStr=1.42426 BotTanAngle=90 CornerRad=0 Height=52.0793 LowStr=1.42286 MaxWidthLoc=-0.190324 TopStr=1.00146 TopTanAngle=90 UpStr=2 Width=47.3885
    4  0.479564     0            0.042478     general fuselage BotStr=1.16875 BotTanAngle=90 CornerRad=0 Height=50.5893 LowStr=1.5 MaxWidthLoc=-0.125562 TopStr=1.25 TopTanAngle=90 UpStr=1.50472 Width=44.5205
    5  0.671993     0            0.03643      general fuselage BotStr=1.03404 BotTanAngle=90 CornerRad=0 Height=32.3042 LowStr=1.0683 MaxWidthLoc=-0.310309 TopStr=1.85654 TopTanAngle=90 UpStr=0.818164 Width=29.8883
    6  0.923427     0            0.041126     general fuselage BotStr=0.952476 BotTanAngle=90 CornerRad=0 Height=16.2922 LowStr=0.67819 MaxWidthLoc=-0.500607 TopStr=2 TopTanAngle=90 UpStr=1.27804 Width=10.4965
    7  1            0            0.045371     point

Fuselage "GearPod", child of "Origin"
  location (X Y Z) 151.948 20.1696 49.3765, rotation 0 0 0
  symmetric about XZ
  bounding box size 39.2922 70.0243 6.67337
  Design: Length=38.6033
  cross sections:
    n  XLocPercent  YLocPercent  ZLocPercent  shape
    0  0            0            0            point
    1  0.188638     0            -0.032472    general fuselage BotStr=0.042923 BotTanAngle=90 CornerRad=0 Height=6.64433 LowStr=1.3145 MaxWidthLoc=0.100759 TopStr=1.5606 TopTanAngle=90 UpStr=0.379586 Width=28.9178
    2  0.58526      0            -0.033286    general fuselage BotStr=0.048982 BotTanAngle=90 CornerRad=0 Height=6.5677 LowStr=1.315 MaxWidthLoc=0.100759 TopStr=1.56097 TopTanAngle=90 UpStr=0.38227 Width=28.7787
    3  0.780798     0            -0.0223388   general fuselage BotStr=0.684282 BotTanAngle=90 CornerRad=0 Height=4.84983 LowStr=0.393477 MaxWidthLoc=0.257254 TopStr=1.45842 TopTanAngle=90 UpStr=0 Width=27.0116
    4  1            0            0            point

Hinge "HorzStab-Hinge", child of "Origin"
  location (X Y Z) 334.975 0 64.8763, rotation -180 0 -90
  Hinge: JointRotMax=30 JointRotMaxFlag=1 JointRotMin=-21 JointRotMinFlag=1 JointRotate=0 JointRotateFlag=1 JointTransMax=1000 JointTransMaxFlag=0 JointTransMin=-1000 JointTransMinFlag=0 JointTranslate=0 JointTranslateFlag=0 OrientRotFlag=1 PrimOffAbsRelFlag=1 PrimType=0 PrimULoc=0 PrimVecAbsRelFlag=1 PrimWLoc=0 PrimXOff=0 PrimXOffRel=0 PrimXVec=0 PrimXVecRel=0 PrimYOff=0 PrimYOffRel=0 PrimYVec=1 PrimYVecRel=1 PrimZOff=0 PrimZOffRel=0 PrimZVec=0 PrimZVecRel=0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

Wing "HorzStab", child of "HorzStab-Hinge"
  location (X Y Z) 327.046 0 64.7972, rotation 0 0 0; relative location 0 -7.929 0.07908, rotation 180 0 -90
  symmetric about XZ
  bounding box size 30.6413 128.947 3.42425
  totals: TotalSpan=123.811 TotalProjectedSpan=123.811 TotalChord=30.6413 TotalArea=3793.73 TotalAR=4.04066
  root: chord 30.6413, twist 0, NACA 4-series Camber=0 CamberLoc=0.2 ThickChord=0.11
  sections:
    n  Span     Root_Chord  Tip_Chord  Area     Sweep  Sweep_Location  Dihedral  Twist  Twist_Location  tip airfoil
    1  2.42124  30.6413     30.6413    74.1899  0      0               0         0      0.25            as above
    2  5.31852  30.6413     30.6413    162.966  0      0               0         0      0.25            as above
    3  30.7602  30.6413     30.6413    942.532  0      0               0         0      0.25            as above
    4  0.12     30.6413     30.6413    3.67695  0      0               0         0      0.25            as above
    5  23.2855  30.6413     30.6413    713.498  0      0               0         0      0.25            as above

Wing "VertTail", child of "Origin"
  location (X Y Z) 276 0 67.464, rotation 90 0 0
  bounding box size 89.3202 6.25106 64.1979
  totals: TotalSpan=63.8204 TotalProjectedSpan=63.8204 TotalChord=56.691 TotalArea=3021.28 TotalAR=1.34812
  root: chord 75.2748, twist 0, airfoil file "Tecnam_Vtail_Z_Z67.464_max0.562169_TE0.743854"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 ThickChord=0.1
  sections:
    n   Span     Root_Chord  Tip_Chord  Area     Sweep    Sweep_Location  Dihedral  Twist  Twist_Location  tip airfoil
    1   4.7268   75.2748     76.488     358.676  0        0               0         0      0.25            airfoil file "Tecnam_Vtail_Y2_Z72.1902_max0.588102_TE0.755265"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 ThickChord=0.1
    2   0.1188   76.488      76.518     9.08856  0        0               0         0      0.25            airfoil file "Tecnam_Vtail_Y_Z72.3088_max0.588742"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 ThickChord=0.1
    3   3.528    76.518      77.424     271.554  0        0               0         0      0.25            airfoil file "Tecnam_Vtail_LE-0_Z75.8364_max0.607554"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 ThickChord=0.1
    4   0.5868   77.424      72.5988    44.0167  83.2753  0               0         0      0.25            airfoil file "Tecnam_Vtail_LE-1_Z76.423_max0.583957"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 ThickChord=0.1
    5   1.3272   72.5988     67.002     92.6391  77.4028  0               0         0      0.25            airfoil file "Tecnam_Vtail_LE-2_Z77.75_max0.555287"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 ThickChord=0.1
    6   1.716    67.002      62.5908    111.191  70.5299  0               0         0      0.25            airfoil file "Tecnam_Vtail_A_Z79.466_max0.532368"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 ThickChord=0.1
    7   2.034    62.5908     58.8516    123.507  64.4824  0               0         0      0.25            airfoil file "Tecnam_Vtail_LE-3_Z81.5_max0.51328"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 ThickChord=0.1
    8   2.4576   58.8516     55.4424    140.444  58.6903  0               0         0      0.25            airfoil file "Tecnam_Vtail_B_Z83.9573_max0.496971"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 ThickChord=0.1
    9   5.5212   55.4424     50.202     291.642  50.4092  0               0         0      0.25            airfoil file "Vtail - short chord"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 ThickChord=0.1
    10  5.484    50.202      46.9716    266.45   40.2209  0               0         0      0.25            as above
    11  1.638    46.9716     46.0068    76.1493  40.221   0               0         0      0.25            airfoil file "Tecnam_Vtail_V_Z96.6004_TE0.94804"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 ThickChord=0.1
    12  30.5688  46.0068     27.84      1128.7   40.2209  0               0         0      0.25            airfoil file "Tecnam_Vtail_D_Z127.169_TE0.914458"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 ThickChord=0.1
    13  2.16     27.84       26.4       58.5792  17.7933  1               0         0      0.25            NACA 4-series Camber=0 CamberLoc=0.2 ThickChord=0.09989
    14  1.95324  26.4        23.4       48.6357  14.39    1               0         0      0.25            NACA 4-series Camber=0 CamberLoc=0.2 ThickChord=0.057

Blank "Wing_Parent", child of "Origin"
  location (X Y Z) 144.849 0 86.691, rotation 0 0 0

Wing "CleanWing", child of "Wing_Parent"
  location (X Y Z) 144.849 0 86.691, rotation 0 0 0; relative location 0 0 0, rotation 0 0 0
  symmetric about XZ
  bounding box size 29.7448 379.473 4.64931
  totals: TotalSpan=379.473 TotalProjectedSpan=379.473 TotalChord=25.2982 TotalArea=9600 TotalAR=15
  root: chord 29.7626, twist 2, airfoil file "hccl-5.4 (new4)_Y=00.000_C=2.480219_TE-abs:4.mm_TE-z/c:.005292"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 ThickChord=0.15
  sections:
    n  Span     Root_Chord  Tip_Chord  Area  Sweep  Sweep_Location  Dihedral  Twist  Twist_Location  tip airfoil
    1  189.737  29.7626     20.8338    4800  0      0.7             0         0      0.7             airfoil file "hccl-5.4 (new4)_Y=15.811388_C=1.736151_TE-abs:4.mm_TE-z/c:.007559"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 ThickChord=0.15

Hinge "Flap_Hinge", child of "Wing_Parent"
  location (X Y Z) 168.738 34.98 81.309, rotation -180 -57.4074 -90.4573; relative location 23.8888 34.98 -5.38198, rotation -180 -57.4074 -90.4573
  Hinge: JointRotMax=30 JointRotMaxFlag=1 JointRotMin=0 JointRotMinFlag=1 JointRotate=0 JointRotateFlag=1 JointTransMax=1000 JointTransMaxFlag=0 JointTransMin=-1000 JointTransMinFlag=0 JointTranslate=0 JointTranslateFlag=0 OrientRotFlag=1 PrimOffAbsRelFlag=0 PrimType=1 PrimULoc=0 PrimVecAbsRelFlag=1 PrimWLoc=0 PrimXOff=168.348 PrimXOffRel=23.4988 PrimXVec=-0.0042988 PrimXVecRel=-0.0042988 PrimYOff=125.7 PrimYOffRel=125.7 PrimYVec=0.999968 PrimYVecRel=0.999968 PrimZOff=81.919 PrimZOffRel=-4.77198 PrimZVec=0.00672377 PrimZVecRel=0.00672377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

Stack "Flap_Cover_7", child of "Flap_Hinge"
  location (X Y Z) 166.213 34.9727 83.0993, rotation 0.176315 -33.9999 0.0950028; relative location 0.0155723 -2.86852 1.16315, rotation 88.5926 0.310945 -89.9924
  symmetric about XZ
  bounding box size 7.58573 72.3425 7.59045
  cross sections:
    n  XDelta    YDelta  YRotate  ZDelta     shape
    0  0         0       0        0          point
    1  0         0       0        0          general fuselage BotStr=1.3 BotTanAngle=90 CornerRad=0 Height=6.72 LowStr=0 MaxWidthLoc=1 TopStr=0 TopTanAngle=90 UpStr=0 Width=2.1211
    2  1.89775   0       19.6364  -0.545594  general fuselage BotStr=1.83678 BotTanAngle=90 CornerRad=0 Height=7.02 LowStr=0 MaxWidthLoc=1 TopStr=0 TopTanAngle=90 UpStr=0 Width=2.17334
    3  2.24475   0       31       -0.376537  general fuselage BotStr=2 BotTanAngle=90 CornerRad=0 Height=7.03035 LowStr=2 MaxWidthLoc=1 TopStr=0 TopTanAngle=90 UpStr=0 Width=1.08761
    4  0.485387  0       -90      3.60015    ellipse Ellipse_Height=0 Ellipse_Width=0.247807

Stack "Flap_Cover_9", child of "Flap_Hinge"
  location (X Y Z) 166.335 80.34 83.262, rotation 0 -34 0; relative location 45.382 -2.57776 0.972574, rotation 88.5925 0.457117 -89.9888
  symmetric about XZ
  bounding box size 6.95208 163.078 7.02799
  cross sections:
    n  XDelta    YDelta  YRotate  ZDelta     shape
    0  0         0       0        0          point
    1  0         0       0        0          general fuselage BotStr=1.3 BotTanAngle=90 CornerRad=0 Height=5.87625 LowStr=0 MaxWidthLoc=1 TopStr=0 TopTanAngle=90 UpStr=0 Width=2.15519
    2  1.70948   0       19.6364  -0.407275  general fuselage BotStr=1.83678 BotTanAngle=90 CornerRad=0 Height=6.6 LowStr=0 MaxWidthLoc=1 TopStr=0 TopTanAngle=90 UpStr=0 Width=2.18186
    3  2.16406   0       31       -0.376537  general fuselage BotStr=2 BotTanAngle=90 CornerRad=0 Height=6.40819 LowStr=2 MaxWidthLoc=1 TopStr=0 TopTanAngle=90 UpStr=0 Width=1.08761
    4  0.485387  0       -90      3.32351    ellipse Ellipse_Height=0 Ellipse_Width=0.247807

Stack "Flap_Cover_11", child of "Flap_Hinge"
  location (X Y Z) 166.009 125.7 83.915, rotation 0 -34 0; relative location 90.7464 -2.94151 0.895491, rotation 88.5925 0.457117 -89.9888
  symmetric about XZ
  bounding box size 6.71709 253.866 6.54181
  cross sections:
    n  XDelta    YDelta  YRotate  ZDelta     shape
    0  0         0       0        0          point
    1  0         0       0        0          general fuselage BotStr=1.3 BotTanAngle=90 CornerRad=0 Height=5.34784 LowStr=0 MaxWidthLoc=1 TopStr=0 TopTanAngle=90 UpStr=0 Width=2.24894
    2  1.64416   0       19.6364  -0.845287  general fuselage BotStr=1.83678 BotTanAngle=90 CornerRad=0 Height=6.1142 LowStr=0 MaxWidthLoc=1 TopStr=0 TopTanAngle=90 UpStr=0 Width=2.22447
    3  1.93353   0       31       -0.376537  general fuselage BotStr=2 BotTanAngle=90 CornerRad=0 Height=6.00762 LowStr=2 MaxWidthLoc=1 TopStr=0 TopTanAngle=90 UpStr=0 Width=1.08761
    4  0.485387  0       -90      3.13909    ellipse Ellipse_Height=0 Ellipse_Width=0.247807

Wing "Pylon_07", child of "Wing_Parent"
  location (X Y Z) 147.19 34.98 87.291, rotation -90 0 0; relative location 2.34087 34.98 0.6, rotation -90 0 0
  symmetric about XZ
  bounding box size 21.2 73.5861 3
  totals: TotalSpan=6 TotalProjectedSpan=6 TotalChord=21.2 TotalArea=127.2 TotalAR=0.283018
  root: chord 21.2, twist 0, airfoil file "pylon7_tovc-0.17099_xcmaxtoc-0.38915_te_thick-0.09346"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 ThickChord=0.15385
  sections:
    n  Span  Root_Chord  Tip_Chord  Area     Sweep  Sweep_Location  Dihedral  Twist  Twist_Location  tip airfoil
    1  3     21.2        21.2       63.6001  0      0               0         0      0.25            as above

Stack "HLNac-7", child of "Pylon_07"
  location (X Y Z) 129.826 34.98 82.491, rotation 0 0 0; relative location -17.364 0 -4.8, rotation 0 0 0
  symmetric about XZ
  bounding box size 38.7412 76.32 6.45394
  cross sections:
    n  XDelta   YDelta  ZDelta   shape
    0  0        0       0        point
    1  6        0       0        circle Circle_Diameter=6.12
    2  2.4      0       0        circle Circle_Diameter=6.36
    3  2.64     0       0        as above
    4  2.409    0       0        as above
    5  1.5      0       0        as above
    6  5.11812  0       0        as above
    7  18.674   0       0.48192  general fuselage BotStr=1.4107 BotTanAngle=90 CornerRad=0 Height=5.39628 LowStr=0.1 MaxWidthLoc=0.5 TopStr=1.6667 TopTanAngle=90 UpStr=0.85667 Width=1.956
    8  0        0       0.06456  point

Custom "HL-Disk", child of "HLNac-7"
  location (X Y Z) 135.826 34.98 82.491, rotation 0 0 0; relative location 6 0 0, rotation 0 0 0
  symmetric about XZ
  bounding box size 0 92.634 22.674
  Design: Diameter=22.674
  custom script Disk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

Wing "Pylon_08", child of "Wing_Parent"
  location (X Y Z) 147.935 57.66 87.291, rotation -90 0 0; relative location 3.08595 57.66 0.6, rotation -90 0 0
  symmetric about XZ
  bounding box size 18.5964 118.947 3.6
  totals: TotalSpan=7.2 TotalProjectedSpan=7.2 TotalChord=18.5 TotalArea=133.2 TotalAR=0.389188
  root: chord 18.5, twist 0, airfoil file "pylon8_tovc-0.19595_xcmaxtoc-0.44594_te_thick-0.01363"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 ThickChord=0.15957
  sections:
    n  Span  Root_Chord  Tip_Chord  Area     Sweep  Sweep_Location  Dihedral  Twist  Twist_Location  tip airfoil
    1  3.6   18.5        18.5       66.6001  0      0               0         0      0.25            as above

Stack "HLNac-8", child of "Pylon_08"
  location (X Y Z) 131.807 57.66 82.491, rotation 0 0 0; relative location -16.128 0 -4.8, rotation 0 0 0
  symmetric about XZ
  bounding box size 34.8109 121.68 7.14641
  cross sections:
    n  XDelta   YDelta  ZDelta   shape
    0  0        0       0        point
    1  6        0       0        circle Circle_Diameter=6.12
    2  2.4      0       0        circle Circle_Diameter=6.36
    3  2.64     0       0        as above
    4  2.409    0       0        as above
    5  1.5      0       0        as above
    6  5.11812  0       0        as above
    7  14.6131  0       1.30308  ellipse Ellipse_Height=3.33 Ellipse_Width=0.25212
    8  0.09924  0       0        point

Custom "HL-Disk", child of "HLNac-8"
  location (X Y Z) 137.807 57.66 82.491, rotation 0 0 0; relative location 6 0 0, rotation 0 0 0
  symmetric about XZ
  bounding box size 0 137.994 22.674
  Design: Diameter=22.674
  custom script Disk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

Wing "Pylon_09", child of "Wing_Parent"
  location (X Y Z) 148.679 80.34 87.291, rotation -90 0 0; relative location 3.82995 80.34 0.6, rotation -90 0 0
  symmetric about XZ
  bounding box size 19.6 164.306 3
  totals: TotalSpan=6 TotalProjectedSpan=6 TotalChord=19.6 TotalArea=117.6 TotalAR=0.306123
  root: chord 19.6, twist 0, airfoil file "pylon9_tovc-0.18495_xcmaxtoc-0.42092_te_thick-0.10204"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 ThickChord=0.2
  sections:
    n  Span  Root_Chord  Tip_Chord  Area     Sweep  Sweep_Location  Dihedral  Twist  Twist_Location  tip airfoil
    1  3     19.6        19.6       58.7999  0      0               0         0      0.25            as above

Stack "HLNac-9", child of "Pylon_09"
  location (X Y Z) 129.827 80.34 82.491, rotation 0 0 0; relative location -18.852 0 -4.8, rotation 0 0 0
  symmetric about XZ
  bounding box size 38.7205 167.04 6.44467
  cross sections:
    n  XDelta   YDelta  ZDelta   shape
    0  0        0       0        point
    1  6        0       0        circle Circle_Diameter=6.12
    2  2.4      0       0        circle Circle_Diameter=6.36
    3  2.64     0       0        as above
    4  2.409    0       0        as above
    5  1.5      0       0        as above
    6  5.11812  0       0        as above
    7  18.6534  0       0.71568  general fuselage BotStr=1.4107 BotTanAngle=90 CornerRad=0 Height=4.92852 LowStr=0.1 MaxWidthLoc=0.5 TopStr=1.6667 TopTanAngle=90 UpStr=0.85667 Width=1.98
    8  0        0       0        point

Custom "HL-Disk", child of "HLNac-9"
  location (X Y Z) 135.827 80.34 82.491, rotation 0 0 0; relative location 6 0 0, rotation 0 0 0
  symmetric about XZ
  bounding box size 0 183.354 22.674
  Design: Diameter=22.674
  custom script Disk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

Wing "Pylon_10", child of "Wing_Parent"
  location (X Y Z) 149.423 103.02 87.291, rotation -90 0 0; relative location 4.57395 103.02 0.6, rotation -90 0 0
  symmetric about XZ
  bounding box size 18.6965 209.667 3.6
  totals: TotalSpan=7.2 TotalProjectedSpan=7.2 TotalChord=18.6 TotalArea=133.92 TotalAR=0.387097
  root: chord 18.6, twist 0, airfoil file "pylon10_tovc-0.19489_xcmaxtoc-0.44355_te_thick-0.01355"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 ThickChord=0.2
  sections:
    n  Span  Root_Chord  Tip_Chord  Area   Sweep  Sweep_Location  Dihedral  Twist  Twist_Location  tip airfoil
    1  3.6   18.6        18.6       66.96  0      0               0         0      0.25            as above

Stack "HLNac-10", child of "Pylon_10"
  location (X Y Z) 133.295 103.02 82.491, rotation 0 0 0; relative location -16.128 0 -4.8, rotation 0 0 0
  symmetric about XZ
  bounding box size 34.8831 212.4 7.14642
  cross sections:
    n  XDelta   YDelta  ZDelta   shape
    0  0        0       0        point
    1  6        0       0        circle Circle_Diameter=6.12
    2  2.4      0       0        circle Circle_Diameter=6.36
    3  2.64     0       0        as above
    4  2.409    0       0        as above
    5  1.5      0       0        as above
    6  5.11812  0       0        as above
    7  14.6854  0       1.30308  ellipse Ellipse_Height=3.33 Ellipse_Width=0.25212
    8  0.0996   0       0        point

Custom "HL-Disk", child of "HLNac-10"
  location (X Y Z) 139.295 103.02 82.491, rotation 0 0 0; relative location 6 0 0, rotation 0 0 0
  symmetric about XZ
  bounding box size 0 228.714 22.674
  Design: Diameter=22.674
  custom script Disk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

Wing "Pylon_11", child of "Wing_Parent"
  location (X Y Z) 150.168 125.7 87.291, rotation -90 0 0; relative location 5.31891 125.7 0.6, rotation -90 0 0
  symmetric about XZ
  bounding box size 18.1 255.027 3
  totals: TotalSpan=6 TotalProjectedSpan=6 TotalChord=18.1 TotalArea=108.6 TotalAR=0.331492
  root: chord 18.1, twist 0, airfoil file "pylon11_tovc-0.20028_xcmaxtoc-0.45580_te_thick-0.11050"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 ThickChord=0.2
  sections:
    n  Span  Root_Chord  Tip_Chord  Area     Sweep  Sweep_Location  Dihedral  Twist  Twist_Location  tip airfoil
    1  3     18.1        18.1       54.2999  0      0               0         0      0.25            as above

Stack "HLNac-11", child of "Pylon_11"
  location (X Y Z) 131.316 125.7 82.491, rotation 0 0 0; relative location -18.852 0 -4.8, rotation 0 0 0
  symmetric about XZ
  bounding box size 37.1708 257.76 6.44105
  cross sections:
    n  XDelta   YDelta  ZDelta   shape
    0  0        0       0        point
    1  6        0       0        circle Circle_Diameter=6.12
    2  2.4      0       0        circle Circle_Diameter=6.36
    3  2.64     0       0        as above
    4  2.409    0       0        as above
    5  1.5      0       0        as above
    6  5.11812  0       0        as above
    7  17.1037  0       0.94632  general fuselage BotStr=1.4107 BotTanAngle=90 CornerRad=0 Height=4.46724 LowStr=0.1 MaxWidthLoc=0.5 TopStr=1.6667 TopTanAngle=90 UpStr=0.85667 Width=2.004
    8  0        0       0        point

Custom "HL-Disk", child of "HLNac-11"
  location (X Y Z) 137.316 125.7 82.491, rotation 0 0 0; relative location 6 0 0, rotation 0 0 0
  symmetric about XZ
  bounding box size 0 274.074 22.674
  Design: Diameter=22.674
  custom script Disk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

Wing "Pylon_12", child of "Wing_Parent"
  location (X Y Z) 150.912 148.38 87.291, rotation -90 0 0; relative location 6.06291 148.38 0.6, rotation -90 0 0
  symmetric about XZ
  bounding box size 18.7968 300.386 3.6
  totals: TotalSpan=7.2 TotalProjectedSpan=7.2 TotalChord=18.7 TotalArea=134.64 TotalAR=0.385028
  root: chord 18.7, twist 0, airfoil file "pylon12_tovc-0.19385_xcmaxtoc-0.44118_te_thick-0.01348"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 ThickChord=0.2
  sections:
    n  Span  Root_Chord  Tip_Chord  Area     Sweep  Sweep_Location  Dihedral  Twist  Twist_Location  tip airfoil
    1  2.58  18.7        18.7       48.2459  0      0               0         0      0.25            as above
    2  1.02  18.7        18.7       19.074   0      0               0         0      0.25            as above

Stack "HLNac-12", child of "Pylon_12"
  location (X Y Z) 134.808 148.38 82.491, rotation 0 0 0; relative location -16.104 0 -4.8, rotation 0 0 0
  symmetric about XZ
  bounding box size 34.9798 303.12 7.1576
  cross sections:
    n  XDelta   YDelta  ZDelta   shape
    0  0        0       0        point
    1  6        0       0        circle Circle_Diameter=6.12
    2  2.4      0       0        circle Circle_Diameter=6.36
    3  2.64     0       0        as above
    4  2.409    0       0        as above
    5  1.5      0       0        as above
    6  5.11812  0       0        as above
    7  14.7821  0       1.31424  ellipse Ellipse_Height=3.33 Ellipse_Width=0.25212
    8  0.09996  0       0        point

Custom "HL-Disk", child of "HLNac-12"
  location (X Y Z) 140.808 148.38 82.491, rotation 0 0 0; relative location 6 0 0, rotation 0 0 0
  symmetric about XZ
  bounding box size 0 319.434 22.674
  Design: Diameter=22.674
  custom script Disk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

Stack "CruiseNacelle", child of "Wing_Parent"
  location (X Y Z) 126.381 189.741 87.649, rotation 0 0 0; relative location -18.4682 189.741 0.958024, rotation 0 0 0
  symmetric about XZ
  bounding box size 69.4908 393.528 14.0463
  cross sections:
    n  XDelta   YDelta  ZDelta  shape
    0  0        0       0       point
    1  5        0       0       circle Circle_Diameter=7.75
    2  8.465    0       0       circle Circle_Diameter=10.3154
    3  0        0       0       circle Circle_Diameter=12.4425
    4  2.971    0       0       circle Circle_Diameter=13.8
    5  7.0576   0       0       as above
    6  7.9176   0       0       as above
    7  23.6796  0       0       circle Circle_Diameter=8.11554
    8  14.4     0       0       circle Circle_Diameter=2.29116
    9  0        0       0       point

Wing "VG", child of "CruiseNacelle"
  location (X Y Z) 151.811 181.8 90.1757, rotation 0 -17 0
  symmetric about XZ
  bounding box size 2.68381 367.6 0.863003
  totals: TotalSpan=4 TotalProjectedSpan=4 TotalChord=2 TotalArea=8 TotalAR=2
  root: chord 1.2, twist 0, NACA 63-series A=0 IdealCl=0 Invert=1 ThickChord=0.1
  sections:
    n  Span  Root_Chord  Tip_Chord  Area  Sweep  Sweep_Location  Dihedral  Twist  Twist_Location  tip airfoil
    1  2     1.2         2.8        4     0      0.25            0         0      0.25            as above

Disk "CruiseProp-Disk", child of "CruiseNacelle"
  location (X Y Z) 138.113 189.741 87.649, rotation 0 0 0; relative location 11.732 0 0, rotation 0 0 0
  symmetric about XZ
  bounding box size 0 439.482 60
  Design: Diameter=60
  custom script Disk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
