OpenVSP model (file version 4), 48 components.
Geometry view with OpenVSP parameter names; values to 6 digits, angles in degrees, lengths in the model's unit.
Overall bounding box: X_Min=0 X_Len=585.671 Y_Min=-257.625 Y_Len=515.25 Z_Min=0 Z_Len=172.484

Fuselage "Fuselage"
  location (X Y Z) 100 0 100, rotation 0 0 0
  bounding box size 480.607 58.5701 66.86
  Design: Length=480
  cross sections:
    n  XLocPercent  YLocPercent  ZLocPercent  shape
    0  0            0            -0.0326087   point
    1  0.159822     0            -0.0190124   general fuselage BotStr=0.83 BotTanAngle=90 CornerRad=0 Height=60 LowStr=0.83 MaxWidthLoc=0 TopStr=0.83 TopTanAngle=90 UpStr=0.83 Width=55
    2  0.26         0            -0.014018    general fuselage BotStr=0.83 BotTanAngle=90 CornerRad=0 Height=65.0673 LowStr=0.83 MaxWidthLoc=0 TopStr=0.83 TopTanAngle=90 UpStr=0.83 Width=58
    3  0.360821     0            -0.00781042  general fuselage BotStr=0.83 BotTanAngle=90 CornerRad=0 Height=57.6 LowStr=0.83 MaxWidthLoc=0 TopStr=0.83 TopTanAngle=90 UpStr=0.83 Width=50
    4  0.42         0            0.001        general fuselage BotStr=0.83 BotTanAngle=90 CornerRad=0 Height=40.8 LowStr=0.83 MaxWidthLoc=0.0306122 TopStr=0.83 TopTanAngle=90 UpStr=0.83 Width=33
    5  0.48         0            0.01         general fuselage BotStr=0 BotTanAngle=90 CornerRad=0.12727 Height=26.4 LowStr=0 MaxWidthLoc=0.41818 TopStr=0.83 TopTanAngle=90 UpStr=0.83 Width=16
    6  0.896759     0            0.01         as above
    7  0.96875      0            0.021        general fuselage BotStr=1.17595 BotTanAngle=90 CornerRad=0.41504 Height=12 LowStr=0.91267 MaxWidthLoc=0.41818 TopStr=0.83 TopTanAngle=90 UpStr=0.83 Width=8.62188
    8  1            0            0.027        point
  SS_Ellipse "SS_ELLIP_0": Center_U=0.0597826 Center_W=0.75 U_Length=0.075 W_Length=0.5
  SS_Rectangle "SS_RECT_1": Center_U=0.266304 Center_W=0.5 Theta=-5 U_Length=0.07 W_Length=0.25
  SS_Rectangle "SS_RECT_2": Center_U=0.687 Center_W=0.25 U_Length=0.105 W_Length=0.2

Fuselage "FloorBattery", child of "Fuselage"
  location (X Y Z) 160 0 66.5004, rotation 0 0 0; relative location 60 0 -33.5, rotation 0 0 0
  bounding box size 82 20 5.5
  Design: Length=82
  cross sections:
    n  XLocPercent  YLocPercent  ZLocPercent  shape
    0  0            0            0            point
    1  0            0            0            rounded rectangle RoundRectXSec_Radius=0.2 RoundedRect_Height=5.5 RoundedRect_Width=20
    2  0.5          0            0            as above
    3  1            0            0            as above
    4  1            0            0            point

Wing "Wing", child of "Fuselage"
  location (X Y Z) 178.114 0 120.541, rotation 0 0 0; relative location 10 0 1.5, rotation 0 0 0
  symmetric about XZ
  bounding box size 75.4362 419.153 25.6928
  totals: TotalSpan=420.822 TotalProjectedSpan=418.744 TotalChord=40.9231 TotalArea=16413.3 TotalAR=10.6832
  root: chord 45.2308, twist 0, NACA 4-series Camber=0.02 CamberLoc=0.4 ThickChord=0.157
  sections:
    n  Span     Root_Chord  Tip_Chord  Area     Sweep     Sweep_Location  Dihedral  Twist  Twist_Location  tip airfoil
    1  20.8108  45.2308     45.2308    941.289  0         0               0         0      0               as above
    2  81.6     45.2308     38.7692    3427.2   -8.89635  0               6         0      0               as above
    3  108      38.7692     32.3077    3838.15  -9.16678  0               6         0      0               as above
  SS_Control "SS_CONT_0": UStart=0.425 UEnd=0.575 Length_C_Start=0.35 Length_C_End=0.35 Length_Start=15.5481 Length_End=13.8519 LE_Flag=0 Surf_Type=2
  SS_Control "SS_CONT_1": UStart=0.621951 UEnd=0.780488 Length_C_Start=0.35 Length_C_End=0.35 Length_Start=13.321 Length_End=11.5283 LE_Flag=0 Surf_Type=2

Fuselage "InnerLiftNacelles", child of "Wing"
  location (X Y Z) 136.425 101.964 119.288, rotation 8 2 0; relative location -28.916 0 -9.78261, rotation 8 2 0
  symmetric about XZ
  bounding box size 192.391 223.893 27.8726
  Design: Length=192
  cross sections:
    n  XLocPercent  YLocPercent  ZLocPercent  shape
    0  0            0            0            point
    1  0.220109     0            0            general fuselage BotStr=0 BotTanAngle=90 CornerRad=0 Height=27 LowStr=0 MaxWidthLoc=0.3 TopStr=0.83 TopTanAngle=90 UpStr=0.83 Width=20
    2  0.5          0            0.01         general fuselage BotStr=0 BotTanAngle=90 CornerRad=0.127 Height=25.2 LowStr=0 MaxWidthLoc=0.35 TopStr=0.83 TopTanAngle=90 UpStr=0.83 Width=20
    3  0.828804     0            0.035        general fuselage BotStr=0 BotTanAngle=90 CornerRad=0.127 Height=18 LowStr=0 MaxWidthLoc=0.4 TopStr=0.83 TopTanAngle=90 UpStr=0.83 Width=18
    4  1            0            0.055        ellipse Ellipse_Height=8 Ellipse_Width=0
  SS_Rectangle "Sideslip blown flaps": Center_U=0.538043 Center_W=0.255435 U_Length=0.25 W_Length=0.233696

Custom "ElectricActuator", child of "InnerLiftNacelles"
  location (X Y Z) 244.341 102.628 114.565, rotation 8 -88 0; relative location 108.017 0 -1, rotation 0 -90 0
  symmetric about XZ
  bounding box size 5.20635 210.213 18.3345
  Design: MotorDiameter=5 MotorLength=6 ShaftDiameter=2 ShaftLength=12
  custom script ElectricMotor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

Hinge "Raise", child of "ElectricActuator"
  location (X Y Z) 244.97 100.124 132.379, rotation 8 -88 0; relative location 18 0 0, rotation 0 0 0
  Hinge: JointRotMax=360 JointRotMaxFlag=0 JointRotMin=-360 JointRotMinFlag=0 JointRotate=0 JointRotateFlag=0 JointTransMax=0 JointTransMaxFlag=1 JointTransMin=-12 JointTransMinFlag=1 JointTranslate=-12 JointTranslateFlag=1 OrientRotFlag=1 PrimOffAbsRelFlag=1 PrimType=0 PrimULoc=0 PrimVecAbsRelFlag=1 PrimWLoc=0 PrimXOff=0 PrimXOffRel=0 PrimXVec=0.0348995 PrimXVecRel=1 PrimYOff=0 PrimYOffRel=0 PrimYVec=-0.139088 PrimYVecRel=0 PrimZOff=0 PrimZOffRel=0 PrimZVec=0.989665 PrimZVecRel=0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

Propeller "LiftProp", child of "Raise"
  location (X Y Z) 244.621 101.515 122.482, rotation -82 0 92; relative location 2 0 0, rotation 90 180 0
  symmetric about XZ
  bounding box size 109.47 216.657 8.99237
  Design: Diameter=108 NumBlade=2 Beta34=20.0182 UseBeta34Flag=1 Feather=20.0101 Rotate=0 Precone=0 ReverseFlag=1 FoldAngle=0 PropMode=0 AF=165.036 CLi=0.472232 Chord=0.2427 Solidity=0.154508 ConstructXoC=0.5 FeatherAxisXoC=0.5 FeatherOffsetXoC=0
  cross sections:
    n  RadiusFrac  shape
    0  0           NACA 4-series Camber=0 CamberLoc=0.2 Chord=13.1058 ThickChord=0.12
    1  1           NACA 4-series Camber=0.05 CamberLoc=0.4 Chord=13.1058 ThickChord=0.12
  Chord along r/R (PCHIP): 0: 0.2427, 0.216: 0.2427, 0.238: 0.2427, 0.269: 0.2427, 0.304: 0.2427, 0.343: 0.2427, 0.383: 0.2427, 0.425: 0.2427, 0.467: 0.2427, 0.508: 0.2427, 0.55: 0.2427, 0.59: 0.2427, 0.629: 0.2427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
  Twist along r/R (PCHIP): 0: 12.2318, 0.216: 11.5218, 0.238: 10.8018, 0.269: 10.0918, 0.304: 9.36182, 0.343: 8.62182, 0.383: 7.88182, 0.425: 7.12182, 0.467: 6.34182, 0.508: 5.55182, 0.55: 4.74182, 0.59: 3.90182, 0.629: 3.05182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
  Thick along r/R (linear): 0: 0.12, 1: 0.12
  CLI along r/R (linear): 0: 0, 1: 0.640061

Stack "Hub", child of "LiftProp"
  location (X Y Z) 244.746 101.014 126.045, rotation -82 0 92; relative location -3.6 0 0, rotation 0 0 0
  symmetric about XZ
  bounding box size 12.2405 215.903 8.81114
  cross sections:
    n  XDelta  YDelta  ZDelta  shape
    0  0       0       0       point
    1  0       0       0       circle Circle_Diameter=12
    2  3.6     0       0       as above
    3  3.5     0       0       as above
    4  0       0       0       point

Propeller "LiftProp", child of "Raise"
  location (X Y Z) 244.868 100.527 129.509, rotation -82 0 92; relative location 9.1 0 0, rotation 90 180 0
  symmetric about XZ
  bounding box size 109.47 214.682 8.99237
  Design: Diameter=108 NumBlade=2 Beta34=20.0182 UseBeta34Flag=1 Feather=20.0101 Rotate=0 Precone=0 ReverseFlag=1 FoldAngle=0 PropMode=0 AF=165.036 CLi=0.472232 Chord=0.2427 Solidity=0.154508 ConstructXoC=0.5 FeatherAxisXoC=0.5 FeatherOffsetXoC=0
  cross sections:
    n  RadiusFrac  shape
    0  0           NACA 4-series Camber=0 CamberLoc=0.2 Chord=13.1058 ThickChord=0.12
    1  1           NACA 4-series Camber=0.05 CamberLoc=0.4 Chord=13.1058 ThickChord=0.12
  blade curves as in "LiftProp"

Stack "Hub", child of "LiftProp"
  location (X Y Z) 244.994 100.027 133.072, rotation -82 0 92; relative location -3.6 0 0, rotation 0 0 0
  symmetric about XZ
  bounding box size 12.2405 213.928 8.81114
  cross sections:
    n  XDelta  YDelta  ZDelta  shape
    0  0       0       0       point
    1  0       0       0       circle Circle_Diameter=12
    2  3.6     0       0       as above
    3  3.5     0       0       as above
    4  0       0       0       point

Fuselage "BoomBattery", child of "InnerLiftNacelles"
  location (X Y Z) 151.416 102.037 118.769, rotation 98 0 -4; relative location 15 0 0, rotation 90 0 -2
  symmetric about XZ
  bounding box size 55.7031 212.204 16.3677
  Design: Length=55
  cross sections:
    n  XLocPercent  YLocPercent  ZLocPercent  shape
    0  0            0            0            point
    1  0            0            0            rounded rectangle RoundRectXSec_Radius=0.2 RoundedRect_Height=5.5 RoundedRect_Width=12
    2  0.5          0            0            as above
    3  1            0            0            as above
    4  1            0            0            point

Fuselage "OuterLiftNacelles", child of "Wing"
  location (X Y Z) 94.9971 209.372 130.577, rotation 8 2 0; relative location -52.916 0 -9.78261, rotation 8 2 0
  symmetric about XZ
  bounding box size 216.423 441.169 27.5212
  Design: Length=216
  cross sections:
    n  XLocPercent  YLocPercent  ZLocPercent  shape
    0  0            0            0            point
    1  0.110054     0            0            circle Circle_Diameter=20
    2  0.220109     0            0            general fuselage BotStr=0 BotTanAngle=90 CornerRad=0 Height=27 LowStr=0 MaxWidthLoc=0.3 TopStr=0.83 TopTanAngle=90 UpStr=0.83 Width=20
    3  0.5          0            0.01         general fuselage BotStr=0 BotTanAngle=90 CornerRad=0.127 Height=25.2 LowStr=0 MaxWidthLoc=0.35 TopStr=0.83 TopTanAngle=90 UpStr=0.83 Width=20
    4  0.828804     0            0.035        general fuselage BotStr=0 BotTanAngle=90 CornerRad=0.127 Height=18 LowStr=0 MaxWidthLoc=0.4 TopStr=0.83 TopTanAngle=90 UpStr=0.83 Width=18
    5  1            0            0.055        ellipse Ellipse_Height=8 Ellipse_Width=0
  SS_Rectangle "Sideslip blown flaps": Center_U=0.538043 Center_W=0.255435 U_Length=0.25 W_Length=0.233696

Custom "ElectricMotor", child of "OuterLiftNacelles"
  location (X Y Z) 121.997 209.372 130.577, rotation -180 0 -180; relative location 27 0 0, rotation 0 180 0
  symmetric about XZ
  bounding box size 11 433.744 15
  Design: MotorDiameter=15 MotorLength=3 ShaftDiameter=2 ShaftLength=8
  custom script ElectricMotor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

Propeller "CrzProp", child of "ElectricMotor"
  location (X Y Z) 121.997 209.372 130.577, rotation -180 0 -180; relative location 0 0 0, rotation 0 0 0
  symmetric about XZ
  bounding box size 11.5826 515.25 83.8175
  Design: Diameter=96.4173 NumBlade=3 Beta34=47.1027 UseBeta34Flag=1 Feather=47.1168 Rotate=0 Precone=0 ReverseFlag=0 FoldAngle=0 PropMode=0 AF=50.0133 CLi=0.454228 Chord=0.134429 Solidity=0.12837 ConstructXoC=0.5 FeatherAxisXoC=0.5 FeatherOffsetXoC=0
  cross sections:
    n  RadiusFrac  shape
    0  0.175       NACA 4-series Camber=0 CamberLoc=0.2 Chord=11.5942 ThickChord=0.12
    1  1           NACA 4-series Camber=0.05 CamberLoc=0.4 Chord=0.867756 ThickChord=0.12
  Chord along r/R (PCHIP): 0.175: 0.2405, 0.216: 0.23, 0.238: 0.2196, 0.269: 0.2092, 0.304: 0.199, 0.343: 0.1888, 0.383: 0.1789, 0.425: 0.1691, 0.467: 0.1596, 0.508: 0.1503, 0.55: 0.1413, 0.59: 0.1326, 0.629: 0.1242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
  Twist along r/R (PCHIP): 0.175: 40.2973, 0.216: 36.7973, 0.238: 33.3273, 0.269: 29.9173, 0.304: 26.5773, 0.343: 23.3273, 0.383: 20.1873, 0.425: 17.1973, 0.467: 14.3573, 0.508: 11.7073, 0.55: 9.24727, 0.59: 7.00727, 0.629: 5.01727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
  Thick along r/R (linear): 0.175: 0.12, 1: 0.12
  CLI along r/R (linear): 0.175: 0, 1: 0.640061

Custom "ElectricActuator", child of "OuterLiftNacelles"
  location (X Y Z) 222.901 210.133 125.163, rotation 8 -88 0; relative location 128.017 0 -1, rotation 0 -90 0
  symmetric about XZ
  bounding box size 5.20635 425.224 18.3345
  Design: MotorDiameter=5 MotorLength=6 ShaftDiameter=2 ShaftLength=12
  custom script ElectricMotor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

Hinge "Raise", child of "ElectricActuator"
  location (X Y Z) 223.529 207.629 142.977, rotation 8 -88 0; relative location 18 0 0, rotation 0 0 0
  Hinge: JointRotMax=360 JointRotMaxFlag=0 JointRotMin=-360 JointRotMinFlag=0 JointRotate=0 JointRotateFlag=0 JointTransMax=0 JointTransMaxFlag=1 JointTransMin=-12 JointTransMinFlag=1 JointTranslate=-12 JointTranslateFlag=1 OrientRotFlag=1 PrimOffAbsRelFlag=1 PrimType=0 PrimULoc=0 PrimVecAbsRelFlag=1 PrimWLoc=0 PrimXOff=0 PrimXOffRel=0 PrimXVec=0.0348995 PrimXVecRel=1 PrimYOff=0 PrimYOffRel=0 PrimYVec=-0.139088 PrimYVecRel=0 PrimZOff=0 PrimZOffRel=0 PrimZVec=0.989665 PrimZVecRel=0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

Propeller "LiftProp", child of "Raise"
  location (X Y Z) 223.18 209.02 133.08, rotation -82 0 92; relative location 2 0 0, rotation 90 180 0
  symmetric about XZ
  bounding box size 109.47 431.668 8.99237
  Design: Diameter=108 NumBlade=2 Beta34=20.0182 UseBeta34Flag=1 Feather=20.0101 Rotate=0 Precone=0 ReverseFlag=1 FoldAngle=0 PropMode=0 AF=165.036 CLi=0.472232 Chord=0.2427 Solidity=0.154508 ConstructXoC=0.5 FeatherAxisXoC=0.5 FeatherOffsetXoC=0
  cross sections:
    n  RadiusFrac  shape
    0  0           NACA 4-series Camber=0 CamberLoc=0.2 Chord=13.1058 ThickChord=0.12
    1  1           NACA 4-series Camber=0.05 CamberLoc=0.4 Chord=13.1058 ThickChord=0.12
  blade curves as in "LiftProp"

Stack "Hub", child of "LiftProp"
  location (X Y Z) 223.306 208.52 136.643, rotation -82 0 92; relative location -3.6 0 0, rotation 0 0 0
  symmetric about XZ
  bounding box size 12.2405 430.914 8.81114
  cross sections:
    n  XDelta  YDelta  ZDelta  shape
    0  0       0       0       point
    1  0       0       0       circle Circle_Diameter=12
    2  3.6     0       0       as above
    3  3.5     0       0       as above
    4  0       0       0       point

Propeller "LiftProp", child of "Raise"
  location (X Y Z) 223.428 208.033 140.107, rotation -82 0 92; relative location 9.1 0 0, rotation 90 180 0
  symmetric about XZ
  bounding box size 109.47 429.693 8.99237
  Design: Diameter=108 NumBlade=2 Beta34=20.0182 UseBeta34Flag=1 Feather=20.0101 Rotate=0 Precone=0 ReverseFlag=1 FoldAngle=0 PropMode=0 AF=165.036 CLi=0.472232 Chord=0.2427 Solidity=0.154508 ConstructXoC=0.5 FeatherAxisXoC=0.5 FeatherOffsetXoC=0
  cross sections:
    n  RadiusFrac  shape
    0  0           NACA 4-series Camber=0 CamberLoc=0.2 Chord=13.1058 ThickChord=0.12
    1  1           NACA 4-series Camber=0.05 CamberLoc=0.4 Chord=13.1058 ThickChord=0.12
  blade curves as in "LiftProp"

Stack "Hub", child of "LiftProp"
  location (X Y Z) 223.554 207.532 143.67, rotation -82 0 92; relative location -3.6 0 0, rotation 0 0 0
  symmetric about XZ
  bounding box size 12.2405 428.939 8.81114
  cross sections:
    n  XDelta  YDelta  ZDelta  shape
    0  0       0       0       point
    1  0       0       0       circle Circle_Diameter=12
    2  3.6     0       0       as above
    3  3.5     0       0       as above
    4  0       0       0       point

Fuselage "BoomBattery", child of "OuterLiftNacelles"
  location (X Y Z) 136.937 209.715 128.136, rotation 98 0 -3; relative location 42 0 -1, rotation 90 0 -1
  symmetric about XZ
  bounding box size 30.5869 426.932 14.1359
  Design: Length=30
  cross sections:
    n  XLocPercent  YLocPercent  ZLocPercent  shape
    0  0            0            0            point
    1  0            0            0            rounded rectangle RoundRectXSec_Radius=0.2 RoundedRect_Height=5.5 RoundedRect_Width=12
    2  0.5          0            0            as above
    3  1            0            0            as above
    4  1            0            0            point

Conformal "WingBatteryRoot", child of "Wing"
  location (X Y Z) 178.114 0 120.541, rotation 0 0 0; relative location 0 0 0, rotation 0 0 0
  symmetric about XZ
  bounding box size 42.233 40.2071 4.19074
  Design: ChordTrimFlag=0 ChordTrimMax=0.9 ChordTrimMin=0.1 Offset=1.5 UTrimFlag=1 UTrimMax=0.32 UTrimMin=0 V1TrimBegin=0.3 V1TrimEnd=1 V1TrimFlag=0 V2TrimBegin=0.25 V2TrimEnd=0.75 V2TrimFlag=0

Conformal "WingBatteryInbd", child of "Wing"
  location (X Y Z) 178.114 0 120.541, rotation 0 0 0; relative location 0 0 0, rotation 0 0 0
  symmetric about XZ
  bounding box size 25.0651 181.387 10.5259
  Design: ChordTrimFlag=1 ChordTrimMax=0.85 ChordTrimMin=0.52 Offset=1.5 UTrimFlag=1 UTrimMax=0.62 UTrimMin=0.35 V1TrimBegin=0.742437 V1TrimEnd=0.257563 V1TrimFlag=1 V2TrimBegin=0.419786 V2TrimEnd=0.580214 V2TrimFlag=1

Wing "VerticalTail", child of "Fuselage"
  location (X Y Z) 531.896 0 112.991, rotation 90 0 0; relative location 0 0 -5, rotation 90 0 0
  bounding box size 53.7743 7.20312 51
  totals: TotalSpan=51 TotalProjectedSpan=51 TotalChord=45 TotalArea=2295 TotalAR=1.13333
  root: chord 48, twist 0, NACA 4-series Camber=0 CamberLoc=0.2 ThickChord=0.15
  sections:
    n  Span  Root_Chord  Tip_Chord  Area  Sweep  Sweep_Location  Dihedral  Twist  Twist_Location  tip airfoil
    1  51    48          42         2295  13     0               0         0      0.25            NACA 4-series Camber=0 CamberLoc=0.2 ThickChord=0.1
  SS_Control "SS_CONT_0": UStart=0.359756 UEnd=0.640244 Length_C_Start=0.333 Length_C_End=0.333 Length_Start=15.8256 Length_End=14.1444 LE_Flag=0 Surf_Type=2

Wing "Tail", child of "VerticalTail"
  location (X Y Z) 543.671 0 163.991, rotation 0 0 0; relative location 0 0 0, rotation 0 0 0
  symmetric about XZ
  bounding box size 42.0055 195.522 6.35104
  totals: TotalSpan=192 TotalProjectedSpan=192 TotalChord=33 TotalArea=6336 TotalAR=5.81818
  root: chord 42, twist 0, NACA 4-series Camber=0.02 CamberLoc=0.4 ThickChord=0.15
  sections:
    n  Span  Root_Chord  Tip_Chord  Area  Sweep    Sweep_Location  Dihedral  Twist  Twist_Location  tip airfoil
    1  96    42          24         3168  10.6197  0               0         0      0.25            as above

Blank "AftCorotating1", child of "Fuselage"
  location (X Y Z) 363 0 102, rotation 0 0 0; relative location 263 0 2, rotation 0 0 0

Custom "ElectricActuator", child of "AftCorotating1"
  location (X Y Z) 363 0 102, rotation 0 -90 0; relative location 0 0 0, rotation 0 -90 0
  symmetric about XZ
  bounding box size 5 5 18
  Design: MotorDiameter=5 MotorLength=6 ShaftDiameter=2 ShaftLength=12
  custom script ElectricMotor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

Hinge "Raise", child of "ElectricActuator"
  location (X Y Z) 363 0 120, rotation 0 -90 0; relative location 18 0 0, rotation 0 0 0
  Hinge: JointRotMax=360 JointRotMaxFlag=0 JointRotMin=-360 JointRotMinFlag=0 JointRotate=0 JointRotateFlag=0 JointTransMax=0 JointTransMaxFlag=1 JointTransMin=-12 JointTransMinFlag=1 JointTranslate=-12 JointTranslateFlag=1 OrientRotFlag=1 PrimOffAbsRelFlag=1 PrimType=0 PrimULoc=0 PrimVecAbsRelFlag=1 PrimWLoc=0 PrimXOff=0 PrimXOffRel=0 PrimXVec=0 PrimXVecRel=1 PrimYOff=0 PrimYOffRel=0 PrimYVec=0 PrimYVecRel=0 PrimZOff=0 PrimZOffRel=0 PrimZVec=1 PrimZVecRel=0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

Propeller "LiftProp", child of "Raise"
  location (X Y Z) 363 0 110, rotation -90 0 90; relative location 2 0 0, rotation 90 180 0
  bounding box size 109.506 13.0399 7.34894
  Design: Diameter=108 NumBlade=2 Beta34=20.0182 UseBeta34Flag=1 Feather=20.0101 Rotate=0 Precone=0 ReverseFlag=0 FoldAngle=0 PropMode=0 AF=165.036 CLi=0.472232 Chord=0.2427 Solidity=0.154508 ConstructXoC=0.5 FeatherAxisXoC=0.5 FeatherOffsetXoC=0
  cross sections:
    n  RadiusFrac  shape
    0  0           NACA 4-series Camber=0 CamberLoc=0.2 Chord=13.1058 ThickChord=0.12
    1  1           NACA 4-series Camber=0.05 CamberLoc=0.4 Chord=13.1058 ThickChord=0.12
  blade curves as in "LiftProp"

Stack "Hub", child of "LiftProp"
  location (X Y Z) 363 0 113.6, rotation -90 0 90; relative location -3.6 0 0, rotation 0 0 0
  symmetric about XZ
  bounding box size 12 12 7.1
  cross sections:
    n  XDelta  YDelta  ZDelta  shape
    0  0       0       0       point
    1  0       0       0       circle Circle_Diameter=12
    2  3.6     0       0       as above
    3  3.5     0       0       as above
    4  0       0       0       point

Propeller "LiftProp", child of "Raise"
  location (X Y Z) 363 0 117.1, rotation -90 0 90; relative location 9.1 0 0, rotation 90 180 0
  bounding box size 109.506 13.0399 7.34894
  Design: Diameter=108 NumBlade=2 Beta34=20.0182 UseBeta34Flag=1 Feather=20.0101 Rotate=0 Precone=0 ReverseFlag=0 FoldAngle=0 PropMode=0 AF=165.036 CLi=0.472232 Chord=0.2427 Solidity=0.154508 ConstructXoC=0.5 FeatherAxisXoC=0.5 FeatherOffsetXoC=0
  cross sections:
    n  RadiusFrac  shape
    0  0           NACA 4-series Camber=0 CamberLoc=0.2 Chord=13.1058 ThickChord=0.12
    1  1           NACA 4-series Camber=0.05 CamberLoc=0.4 Chord=13.1058 ThickChord=0.12
  blade curves as in "LiftProp"

Stack "Hub", child of "LiftProp"
  location (X Y Z) 363 0 120.7, rotation -90 0 90; relative location -3.6 0 0, rotation 0 0 0
  symmetric about XZ
  bounding box size 12 12 7.1
  cross sections:
    n  XDelta  YDelta  ZDelta  shape
    0  0       0       0       point
    1  0       0       0       circle Circle_Diameter=12
    2  3.6     0       0       as above
    3  3.5     0       0       as above
    4  0       0       0       point

Blank "AftCorotating2", child of "Fuselage"
  location (X Y Z) 474.739 0 102, rotation 0 0 0; relative location 374.739 0 2, rotation 0 0 0

Custom "ElectricActuator", child of "AftCorotating2"
  location (X Y Z) 474.739 0 102, rotation 0 -90 0; relative location 0 0 0, rotation 0 -90 0
  symmetric about XZ
  bounding box size 5 5 18
  Design: MotorDiameter=5 MotorLength=6 ShaftDiameter=2 ShaftLength=12
  custom script ElectricMotor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

Hinge "Raise", child of "ElectricActuator"
  location (X Y Z) 474.739 0 120, rotation 0 -90 0; relative location 18 0 0, rotation 0 0 0
  Hinge: JointRotMax=360 JointRotMaxFlag=0 JointRotMin=-360 JointRotMinFlag=0 JointRotate=0 JointRotateFlag=0 JointTransMax=0 JointTransMaxFlag=1 JointTransMin=-12 JointTransMinFlag=1 JointTranslate=-12 JointTranslateFlag=1 OrientRotFlag=1 PrimOffAbsRelFlag=1 PrimType=0 PrimULoc=0 PrimVecAbsRelFlag=1 PrimWLoc=0 PrimXOff=0 PrimXOffRel=0 PrimXVec=0 PrimXVecRel=1 PrimYOff=0 PrimYOffRel=0 PrimYVec=0 PrimYVecRel=0 PrimZOff=0 PrimZOffRel=0 PrimZVec=1 PrimZVecRel=0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

Propeller "LiftProp", child of "Raise"
  location (X Y Z) 474.739 0 110, rotation -90 0 90; relative location 2 0 0, rotation 90 180 0
  bounding box size 109.506 13.0399 7.34894
  Design: Diameter=108 NumBlade=2 Beta34=20.0182 UseBeta34Flag=1 Feather=20.0101 Rotate=0 Precone=0 ReverseFlag=1 FoldAngle=0 PropMode=0 AF=165.036 CLi=0.472232 Chord=0.2427 Solidity=0.154508 ConstructXoC=0.5 FeatherAxisXoC=0.5 FeatherOffsetXoC=0
  cross sections:
    n  RadiusFrac  shape
    0  0           NACA 4-series Camber=0 CamberLoc=0.2 Chord=13.1058 ThickChord=0.12
    1  1           NACA 4-series Camber=0.05 CamberLoc=0.4 Chord=13.1058 ThickChord=0.12
  blade curves as in "LiftProp"

Stack "Hub", child of "LiftProp"
  location (X Y Z) 474.739 0 113.6, rotation -90 0 90; relative location -3.6 0 0, rotation 0 0 0
  symmetric about XZ
  bounding box size 12 12 7.1
  cross sections:
    n  XDelta  YDelta  ZDelta  shape
    0  0       0       0       point
    1  0       0       0       circle Circle_Diameter=12
    2  3.6     0       0       as above
    3  3.5     0       0       as above
    4  0       0       0       point

Propeller "LiftProp", child of "Raise"
  location (X Y Z) 474.739 0 117.1, rotation -90 0 90; relative location 9.1 0 0, rotation 90 180 0
  bounding box size 109.506 13.0399 7.34894
  Design: Diameter=108 NumBlade=2 Beta34=20.0182 UseBeta34Flag=1 Feather=20.0101 Rotate=0 Precone=0 ReverseFlag=1 FoldAngle=0 PropMode=0 AF=165.036 CLi=0.472232 Chord=0.2427 Solidity=0.154508 ConstructXoC=0.5 FeatherAxisXoC=0.5 FeatherOffsetXoC=0
  cross sections:
    n  RadiusFrac  shape
    0  0           NACA 4-series Camber=0 CamberLoc=0.2 Chord=13.1058 ThickChord=0.12
    1  1           NACA 4-series Camber=0.05 CamberLoc=0.4 Chord=13.1058 ThickChord=0.12
  blade curves as in "LiftProp"

Stack "Hub", child of "LiftProp"
  location (X Y Z) 474.739 0 120.7, rotation -90 0 90; relative location -3.6 0 0, rotation 0 0 0
  symmetric about XZ
  bounding box size 12 12 7.1
  cross sections:
    n  XDelta  YDelta  ZDelta  shape
    0  0       0       0       point
    1  0       0       0       circle Circle_Diameter=12
    2  3.6     0       0       as above
    3  3.5     0       0       as above
    4  0       0       0       point

Blank "NoseLG"
  location (X Y Z) 124.107 0 68.25, rotation 0 0 0

Wing "Strut", child of "NoseLG"
  location (X Y Z) 137.307 0 69.2071, rotation -90 0 0; relative location 13.2 0 0.957143, rotation -90 0 0
  symmetric about XZ
  bounding box size 13.3676 1.8007 12
  totals: TotalSpan=24 TotalProjectedSpan=24 TotalChord=9 TotalArea=216 TotalAR=2.66667
  root: chord 9, twist 0, NACA 4-series Camber=0 CamberLoc=0.2 ThickChord=0.2
  sections:
    n  Span  Root_Chord  Tip_Chord  Area  Sweep  Sweep_Location  Dihedral  Twist  Twist_Location  tip airfoil
    1  12    9           9          108   -20    0               0         0      0.25            as above

Fuselage "Pant", child of "NoseLG"
  location (X Y Z) 125.307 0 52.4, rotation 0 0 0; relative location 1.2 0 -15.85, rotation 0 0 0
  bounding box size 27 9.824 13.5515
  Design: Length=27
  cross sections:
    n  XLocPercent  YLocPercent  ZLocPercent  shape
    0  0            0            0            point
    1  0.3          0            0            super ellipse Super_Height=13 Super_M=2 Super_MaxWidthLoc=0 Super_N=2 Super_Width=9
    2  0.6          0            0            as above
    3  1            0            0            ellipse Ellipse_Height=2.4 Ellipse_Width=0

Stack "NoseGear", child of "NoseLG"
  location (X Y Z) 137.107 -2.25 51.272, rotation 0 0 90; relative location 13 -2.25 -16.978, rotation 0 0 90
  bounding box size 15 4.5 15
  cross sections:
    n  XDelta  YDelta  ZDelta  shape
    0  0       0       0       point
    1  1       0       0       circle Circle_Diameter=15
    2  2.5     0       0       as above
    3  1       0       0       point

Blank "MainLG"
  location (X Y Z) 300 0 78.9772, rotation 0 0 0

Wing "Struts", child of "MainLG"
  location (X Y Z) 273 12 82, rotation 0 2 0; relative location -27 12 3.0228, rotation 0 2 0
  symmetric about XZ
  bounding box size 25.6955 74.5701 23.3268
  totals: TotalSpan=64 TotalProjectedSpan=49.0268 TotalChord=15 TotalArea=960 TotalAR=2.50378
  root: chord 18, twist 0, NACA 4-series Camber=0 CamberLoc=0.2 ThickChord=0.2
  sections:
    n  Span  Root_Chord  Tip_Chord  Area  Sweep  Sweep_Location  Dihedral  Twist  Twist_Location  tip airfoil
    1  32    18          12         480   22     0.25            -40       0      0               as above

Fuselage "Pant", child of "MainLG"
  location (X Y Z) 280 37 53.9772, rotation 0 0 0; relative location -20 37 -25, rotation 0 0 0
  symmetric about XZ
  bounding box size 32 83.9766 17.6536
  Design: Length=32
  cross sections:
    n  XLocPercent  YLocPercent  ZLocPercent  shape
    0  0            0            0            point
    1  0.3          0            0            super ellipse Super_Height=17 Super_M=2 Super_MaxWidthLoc=0 Super_N=2 Super_Width=9
    2  0.6          0            0            as above
    3  1            0            0            ellipse Ellipse_Height=2.4 Ellipse_Width=0

Stack "MainGear", child of "MainLG"
  location (X Y Z) 293.5 34.5 52.9772, rotation 0 0 90; relative location -6.5 34.5 -26, rotation 0 0 90
  symmetric about XZ
  bounding box size 18.5 79 18.5
  cross sections:
    n  XDelta  YDelta  ZDelta  shape
    0  0       0       0       point
    1  1       0       0       circle Circle_Diameter=18.5
    2  3       0       0       as above
    3  1       0       0       point

Ellipsoid "CG"
  location (X Y Z) 241.168 0 107.527, rotation 0 0 0
  bounding box size 6 6 6
  Design: A_Radius=3 B_Radius=3 C_Radius=3

User parameters
  VTOL:DiskArea = 3.33333  (Disk Area)
  VTOL:DiskLoading = 50  (Disk Loading)
  VTOL:GrossWeight = 5000  (Gross Weight)
  VTOL:Naft = 20  (Number of disks in aft array)
  VTOL:Nfwd = 10  (Number of disks in forward array)
  VTOL:Spac = 0  (Spac)
